# OpenSim document version 40000
RRATool GIL11_10DOF_backpack_AFO:
  model_file: C:\Users\tm262836\Documents\OpenSim\4.4\Models\Mokadim_Simulation\Gait10dof18musc_113Kg_Exo_bushings\RRA\..\subject01_113kg_exo_metabolics_bushings.osim
  replace_force_set: false
  force_set_files: gait10dof_Reserve_Actuators.xml
  results_directory: ResultsRRA
  output_precision: 10
  initial_time: 0.1333333
  final_time: 1.091667
  solve_for_equilibrium_for_auxiliary_states: true
  maximum_number_of_integrator_steps: 20000
  maximum_integrator_step_size: 1
  minimum_integrator_step_size: 1e-8
  integrator_error_tolerance: 1e-5
  external_loads_file: ../dataFiles/GIL11_free_20kgload_grf.xml
  desired_kinematics_file: ../dataFiles/GIL11_free1.mot
  task_set_file: gait10dof_Kinematics_Tracking_Tasks.xml
  lowpass_cutoff_frequency: 6
  optimizer_algorithm: ipopt
  numerical_derivative_step_size: 0.0001
  optimization_convergence_tolerance: 1e-5
  adjust_com_to_reduce_residuals: true
  initial_time_for_com_adjustment: -1
  final_time_for_com_adjustment: -1
  adjusted_com_body: torso
  output_model_file: C:\Users\tm262836\Documents\OpenSim\4.4\Models\Mokadim_Simulation\experiment\GIL11\Gait10dof18musc_backpack_AFO\GIL11_gait10DOF18musc_backpack_lAFO_adjusted.osim
  use_verbose_printing: false
  AnalysisSet Analyses:
    ForceReporter: start_time=0.1333333 end_time=1.091667 step_interval=1 in_degrees=true
        include_constraint_forces=false
