# OpenSim document version 40000
AnalyzeTool GIL11_noAssist:
  model_file: C:/Users/tm262836/Documents/OpenSim/4.4/Models/Mokadim_Simulation/experiment/GIL11/GIL11_free/Gait10dof18musc/Analyze/../../../../../../../../../../Desktop/_Mokadim_Stiff_deter/GIL11_Eval_Beta_v2/GIL11/1spd/normal/GIL11_noAssist.osim
  replace_force_set: false
  results_directory: .
  output_precision: 8
  initial_time: 0.1333333
  final_time: 1.091667
  solve_for_equilibrium_for_auxiliary_states: false
  maximum_number_of_integrator_steps: 20000
  maximum_integrator_step_size: 1
  minimum_integrator_step_size: 1e-8
  integrator_error_tolerance: 1e-5
  coordinates_file: C:/Users/tm262836/Documents/OpenSim/4.4/Models/Mokadim_Simulation/experiment/GIL11/GIL11_free/Gait10dof18musc/Analyze/../dataFiles/GIL11_free1.mot
  lowpass_cutoff_frequency_for_coordinates: 6
  AnalysisSet Analyses:
    Kinematics: start_time=0.1333333 end_time=1.091667 step_interval=1 in_degrees=true
    OutputReporter: output_paths=(markerset/Sternum|location markerset/R.Acromium|location markerset/L.Acromium|location markerset/Top.Head|location markerset/R.ASIS|location markerset/L.ASIS|location markerset/V.Sacral|location markerset/R.Thigh.Upper|location markerset/R.Thigh.Front|location markerset/R.Thigh.Rear|location markerset/R.Knee.Lat|location markerset/R.Knee.Med|location markerset/R.Shank.Upper|location markerset/R.Shank.Front|location markerset/R.Shank.Rear|location markerset/R.Ankle.Lat|location markerset/R.Ankle.Med|location markerset/R.Heel|location markerset/R.Midfoot.Sup|location markerset/R.Midfoot.Lat|location markerset/R.Toe.Lat|location markerset/R.Toe.Med|location markerset/R.Toe.Tip|location markerset/L.Thigh.Upper|location markerset/L.Thigh.Front|location markerset/L.Thigh.Rear|location markerset/L.Knee.Lat|location markerset/L.Knee.Med|location markerset/L.Shank.Upper|location markerset/L.Shank.Front|location markerset/L.Shank.Rear|location markerset/L.Ankle.Lat|location markerset/L.Ankle.Med|location markerset/L.Heel|location markerset/L.Midfoot.Sup|location markerset/L.Midfoot.Lat|location markerset/L.Toe.Lat|location markerset/L.Toe.Med|location markerset/L.Toe.Tip|location)
        start_time=0.1333333 end_time=1.091667 step_interval=1 in_degrees=true
