# OpenSim document version 40000
Model GIL11_10DOF18musc_backpack_AFO:
  gravity: 0 -9.80665 0
  length_units: meters
  force_units: N
  credits:
    Delp S.L., Loan J.P., Hoy M.G., Zajac F.E., Topp E.L., Rosen J.M., Thelen D.G., Anderson F.C., Seth A. Notes: 3D, 23 DOF gait model created by D.G. Thelen, Univ. of Wisconsin-Madison, and Ajay Seth, Frank C. Anderson, and Scott L. Delp, Stanford University. Lower extremity joint defintions based on Delp et al. (1990). Low back joint and anthropometry based on Anderson and Pandy (1999, 2001). Planar knee model of Yamaguchi and Zajac (1989). Seth replaced tibia translation constraints with a CustomJoint for the knee and removed the patella to eliminate all kinematic constraints; insertions of the quadrucepts are handled with moving points in the tibia frame as defined by Delp 1990. Number of muscles was reduced by Anderson to improve simulation speed for demonstrations and is not intended to be used in research. License: Creative Commons (CCBY 3.0). You are free to distribute, remix, tweak, and build upon this work, even commercially, as long as you credit us for the original creation. http://creativecommons.org/licenses/by/3.0/ More Information: http://simtk-confluence.stanford.edu:8080/display/OpenSim/Gait+2392+and+2354+Models
  publications:
    Delp, S.L., Loan, J.P., Hoy, M.G., Zajac, F.E., Topp E.L., Rosen, J.M.: An interactive graphics-based model of the lower extremity to study orthopaedic surgical procedures, IEEE Transactions on Biomedical Engineering, vol. 37, pp. 757-767, 1990. Yamaguchi G.T., Zajac F.E.: A planar model of the knee joint to characterize the knee extensor mechanism." J . Biomech. vol. 22. pp. 1-10. 1989. Anderson F.C., Pandy M.G.: A dynamic optimization solution for vertical jumping in three dimensions. Computer Methods in Biomechanics and Biomedical Engineering 2:201-231, 1999. Anderson F.C., Pandy M.G.: Dynamic optimization of human walking. Journal of Biomechanical Engineering 123:381-390, 2001.
  Ground
  BodySet:
    Body pelvis: mass=9.886685 [kg] mass_center=(-0.06656325 0 0) inertia=(0.07649635 0.06481333 0.04308488 0 0 0)
        meshes=(sacrum.vtp pelvis.vtp l_pelvis.vtp)
    Body femur_r: mass=7.808441 mass_center=(0 -0.1616081 0) inertia=(0.1015839 0.02662876 0.1071219 0 0 0)
        meshes=femur_r.vtp
    Body tibia_r: mass=3.112413 mass_center=(0 -0.1601089 0) inertia=(0.03111647 0.003148691 0.03154866 0 0 0)
        meshes=(tibia_r.vtp fibula.vtp)
    Body talus_r: mass=0.08394909 mass_center=(0 0 0) inertia=(0.0007840443 0.0007840443 0.0007840443 0 0 0)
        meshes=talus.vtp
    Body calcn_r: mass=1.049364 mass_center=(0.09111867 0.0273356 0)
        inertia=(0.0009757949 0.002718286 0.002857685 0 0 0) meshes=foot.vtp
    Body toes_r: mass=0.1818337 mass_center=(0.03152709 0.00546712 -0.01594577)
        inertia=(6.969964e-5 0.0001393993 6.969964e-5 0 0 0) meshes=bofoot.vtp
    Body femur_l: mass=7.808441 mass_center=(0 -0.1616081 0) inertia=(0.1015839 0.02662876 0.1071219 0 0 0)
        meshes=femur_l.vtp
    Body tibia_l: mass=3.112413 mass_center=(0 -0.1601089 0) inertia=(0.03111647 0.003148691 0.03154866 0 0 0)
        meshes=(tibia_l.vtp l_fibula.vtp)
    Body talus_l: mass=0.08394909 mass_center=(0 0 0) inertia=(0.0007840443 0.0007840443 0.0007840443 0 0 0)
        meshes=l_talus.vtp
    Body calcn_l: mass=1.049364 mass_center=(0.09111867 0.0273356 0)
        inertia=(0.0009757949 0.002718286 0.002857685 0 0 0) meshes=l_foot.vtp
    Body toes_l: mass=0.1818337 mass_center=(0.03152709 0.00546712 0.01594577)
        inertia=(6.969964e-5 0.0001393993 6.969964e-5 0 0 0) meshes=l_bofoot.vtp
    Body torso: mass=28.74132 mass_center=(-0.03083096 0.3288632 0) inertia=(1.307348 0.669857 1.269135 0 0 0)
        meshes=(hat_spine.vtp hat_jaw.vtp hat_skull.vtp hat_ribs.vtp)
    Body backpack: mass=20 mass_center=(0 0 0) inertia=(2.667 3.333 1.7333 0 0 0)
      Brick default: half_lengths=(0.11 0.27 0.2)
    Body AFO_l_lower: mass=0.1 mass_center=(0.08 -0.05 0) inertia=(0.005 0.0125 0.014 0 0 0) meshes=afoPlate.stl
    Body AFO_l_upper: mass=0.1 mass_center=(0 0.25 0) inertia=(0.02 0.005 0.02 0 0 0) meshes=afoCuff.stl
    Body AFO_r_lower: mass=0.1 mass_center=(0.08 -0.05 0) inertia=(0.005 0.0125 0.014 0 0 0) meshes=afoPlate.stl
    Body AFO_r_upper: mass=0.1 mass_center=(0 0.25 0) inertia=(0.02 0.005 0.02 0 0 0) meshes=afoCuff.stl
  JointSet:
    CustomJoint ground_pelvis: socket_parent_frame=ground_offset socket_child_frame=pelvis_offset
      Coordinate pelvis_tilt: default_value=0 range=(-1.570796 1.570796) clamped=false
      Coordinate pelvis_tx: default_value=0 range=(-5 5) clamped=false
      Coordinate pelvis_ty: default_value=1.015 range=(-1 2) clamped=false
      PhysicalOffsetFrame ground_offset: socket_parent=/ground translation=(0 0 0) [meters]
      PhysicalOffsetFrame pelvis_offset: socket_parent=/bodyset/pelvis translation=(0 0 0)
      SpatialTransform: axes_held_at_zero=(rotation2 rotation3 translation3)
        TransformAxis rotation1: coordinates=pelvis_tilt axis=(0 0 1) LinearFunction(coefficients=1 0)
        TransformAxis translation1: coordinates=pelvis_tx axis=(1 0 0) LinearFunction(coefficients=1 0)
        TransformAxis translation2: coordinates=pelvis_ty axis=(0 1 0) LinearFunction(coefficients=1 0)
    PinJoint hip_r: socket_parent_frame=pelvis_offset socket_child_frame=femur_r_offset
      Coordinate hip_flexion_r: default_value=0 range=(-2.094395 2.094395) clamped=false
      PhysicalOffsetFrame pelvis_offset: socket_parent=/bodyset/pelvis translation=(-0.06656325 -0.06223237 0.07861429)
      PhysicalOffsetFrame femur_r_offset: socket_parent=/bodyset/femur_r translation=(0 0 0)
    CustomJoint knee_r: socket_parent_frame=femur_r_offset socket_child_frame=tibia_r_offset
      Coordinate knee_angle_r: default_value=0 range=(-2.094395 0.1745329) clamped=false
      PhysicalOffsetFrame femur_r_offset: socket_parent=/bodyset/femur_r translation=(0 0 0)
      PhysicalOffsetFrame tibia_r_offset: socket_parent=/bodyset/tibia_r translation=(0 0 0)
      SpatialTransform: axes_held_at_zero=(rotation2 rotation3 translation3)
        TransformAxis rotation1: coordinates=knee_angle_r axis=(0 0 1) LinearFunction(coefficients=1 0)
        TransformAxis translation1: coordinates=knee_angle_r axis=(1 0 0)
          MultiplierFunction: scale=0.9506348
            SimmSpline: x=(-2.0944 -1.74533 -1.39626 -1.0472 -0.698132 -0.349066 -0.174533 0.197344 0.337395 0.490178 1.52146 2.0944)
                y=(-0.0032 0.00179 0.00411 0.0041 0.00212 -0.001 -0.0031 -0.005227 -0.005435 -0.005574 -0.005435 -0.00525)
        TransformAxis translation2: coordinates=knee_angle_r axis=(0 1 0)
          MultiplierFunction: scale=0.9506348
            SimmSpline: x=(-2.0944 -1.22173 -0.523599 -0.349066 -0.174533 0.159149 2.0944)
                y=(-0.4226 -0.4082 -0.399 -0.3976 -0.3966 -0.395264 -0.396)
    PinJoint ankle_r: socket_parent_frame=tibia_r_offset socket_child_frame=talus_r_offset
      Coordinate ankle_angle_r: default_value=0 range=(-1.570796 1.570796) clamped=false
      PhysicalOffsetFrame tibia_r_offset: socket_parent=/bodyset/tibia_r translation=(0 -0.3687571 0)
      PhysicalOffsetFrame talus_r_offset: socket_parent=/bodyset/talus_r translation=(0 0 0)
    WeldJoint subtalar_r: socket_parent_frame=talus_r_offset socket_child_frame=calcn_r_offset
      PhysicalOffsetFrame talus_r_offset: socket_parent=/bodyset/talus_r
          translation=(-0.04713192 -0.04054102 0.007653983)
      PhysicalOffsetFrame calcn_r_offset: socket_parent=/bodyset/calcn_r translation=(0 0 0)
    WeldJoint mtp_r: socket_parent_frame=calcn_r_offset socket_child_frame=toes_r_offset
      PhysicalOffsetFrame calcn_r_offset: socket_parent=/bodyset/calcn_r
          translation=(0.1629203 -0.001822373 0.0009840849)
      PhysicalOffsetFrame toes_r_offset: socket_parent=/bodyset/toes_r translation=(0 0 0)
    PinJoint hip_l: socket_parent_frame=pelvis_offset socket_child_frame=femur_l_offset
      Coordinate hip_flexion_l: default_value=0 range=(-2.094395 2.094395) clamped=false
      PhysicalOffsetFrame pelvis_offset: socket_parent=/bodyset/pelvis
          translation=(-0.06656325 -0.06223237 -0.07861429)
      PhysicalOffsetFrame femur_l_offset: socket_parent=/bodyset/femur_l translation=(0 0 0)
    CustomJoint knee_l: socket_parent_frame=femur_l_offset socket_child_frame=tibia_l_offset
      Coordinate knee_angle_l: default_value=0 range=(-2.094395 0.1745329) clamped=false
      PhysicalOffsetFrame femur_l_offset: socket_parent=/bodyset/femur_l translation=(0 0 0)
      PhysicalOffsetFrame tibia_l_offset: socket_parent=/bodyset/tibia_l translation=(0 0 0)
      SpatialTransform: axes_held_at_zero=(rotation2 rotation3 translation3)
        TransformAxis rotation1: coordinates=knee_angle_l axis=(0 0 1) LinearFunction(coefficients=1 0)
        TransformAxis translation1: coordinates=knee_angle_l axis=(1 0 0)
          MultiplierFunction: scale=0.9506348
            SimmSpline: x=(-2.0944 -1.74533 -1.39626 -1.0472 -0.698132 -0.349066 -0.174533 0.197344 0.337395 0.490178 1.52146 2.0944)
                y=(-0.0032 0.00179 0.00411 0.0041 0.00212 -0.001 -0.0031 -0.005227 -0.005435 -0.005574 -0.005435 -0.00525)
        TransformAxis translation2: coordinates=knee_angle_l axis=(0 1 0)
          MultiplierFunction: scale=0.9506348
            SimmSpline: x=(-2.0944 -1.22173 -0.523599 -0.349066 -0.174533 0.159149 2.0944)
                y=(-0.4226 -0.4082 -0.399 -0.3976 -0.3966 -0.395264 -0.396)
    PinJoint ankle_l: socket_parent_frame=tibia_l_offset socket_child_frame=talus_l_offset
      Coordinate ankle_angle_l: default_value=0 range=(-1.570796 1.570796) clamped=false
      PhysicalOffsetFrame tibia_l_offset: socket_parent=/bodyset/tibia_l translation=(0 -0.3687571 0)
      PhysicalOffsetFrame talus_l_offset: socket_parent=/bodyset/talus_l translation=(0 0 0)
    WeldJoint subtalar_l: socket_parent_frame=talus_l_offset socket_child_frame=calcn_l_offset
      PhysicalOffsetFrame talus_l_offset: socket_parent=/bodyset/talus_l
          translation=(-0.04713192 -0.04054102 -0.007653983)
      PhysicalOffsetFrame calcn_l_offset: socket_parent=/bodyset/calcn_l translation=(0 0 0)
    WeldJoint mtp_l: socket_parent_frame=calcn_l_offset socket_child_frame=toes_l_offset
      PhysicalOffsetFrame calcn_l_offset: socket_parent=/bodyset/calcn_l
          translation=(0.1629203 -0.001822373 -0.0009840849)
      PhysicalOffsetFrame toes_l_offset: socket_parent=/bodyset/toes_l translation=(0 0 0)
    PinJoint back: socket_parent_frame=pelvis_offset socket_child_frame=torso_offset
      Coordinate lumbar_extension: default_value=0 range=(-1.570796 1.570796) clamped=false
      PhysicalOffsetFrame pelvis_offset: socket_parent=/bodyset/pelvis translation=(-0.09480773 0.07673136 0)
      PhysicalOffsetFrame torso_offset: socket_parent=/bodyset/torso translation=(0 0 0)
    WeldJoint backpack_strips: socket_parent_frame=torso_offset socket_child_frame=backpack_offset
      PhysicalOffsetFrame backpack_offset: socket_parent=/bodyset/backpack translation=(0.2 -0.2 0)
      PhysicalOffsetFrame torso_offset: socket_parent=/bodyset/torso translation=(0 0 0)
    SliderJoint lAFO_foot_slider: socket_parent_frame=talus_l_offset socket_child_frame=AFO_l_lower_offset
      Coordinate lAFO_foot_slider: default_value=0 range=(-0.5 0.5) clamped=false is_free_to_satisfy_constraints=true
      PhysicalOffsetFrame talus_l_offset: socket_parent=/bodyset/talus_l translation=(0 0 0)
      PhysicalOffsetFrame AFO_l_lower_offset: socket_parent=/bodyset/AFO_l_lower translation=(0 0 0)
    PinJoint lAFO_hinge: socket_parent_frame=AFO_l_lower_offset socket_child_frame=AFO_l_upper_offset
      Coordinate lAFO_hinge: default_value=0 range=(-1.570796 1.570796) clamped=false
          is_free_to_satisfy_constraints=true
      PhysicalOffsetFrame AFO_l_lower_offset: socket_parent=/bodyset/AFO_l_lower translation=(0 0 0)
      PhysicalOffsetFrame AFO_l_upper_offset: socket_parent=/bodyset/AFO_l_upper translation=(0 0 0)
    SliderJoint rAFO_foot_slider: socket_parent_frame=talus_r_offset socket_child_frame=AFO_r_lower_offset
      Coordinate rAFO_foot_slider: default_value=0 range=(-0.5 0.5) clamped=false is_free_to_satisfy_constraints=true
      PhysicalOffsetFrame talus_r_offset: socket_parent=/bodyset/talus_r translation=(0 0 0)
      PhysicalOffsetFrame AFO_r_lower_offset: socket_parent=/bodyset/AFO_r_lower translation=(0 0 0)
    PinJoint rAFO_hinge: socket_parent_frame=AFO_r_lower_offset socket_child_frame=AFO_r_upper_offset
      Coordinate rAFO_hinge: default_value=0 range=(-1.570796 1.570796) clamped=false
          is_free_to_satisfy_constraints=true
      PhysicalOffsetFrame AFO_r_lower_offset: socket_parent=/bodyset/AFO_r_lower translation=(0 0 0)
      PhysicalOffsetFrame AFO_r_upper_offset: socket_parent=/bodyset/AFO_r_upper translation=(0 0 0)
  ForceSet:
    Millard2012EquilibriumMuscle [values shared by the 18 below unless stated]: min_control=0.01 optimal_force=1
        max_contraction_velocity=10 activation_time_constant=0.01 [seconds] deactivation_time_constant=0.04 [seconds]
        minimum_activation=0.01
      ActiveForceLengthCurve: minimum_value=0
      ForceVelocityCurve: concentric_slope_at_vmax=0 concentric_slope_near_vmax=0.25 isometric_slope=5
          eccentric_slope_at_vmax=0 eccentric_slope_near_vmax=0.15 max_eccentric_velocity_force_multiplier=1.4
      FiberForceLengthCurve
      TendonForceLengthCurve
    Millard2012EquilibriumMuscle hamstrings_r: max_isometric_force=2700 optimal_fiber_length=0.1022671
        tendon_slack_length=0.3058632 pennation_angle_at_optimal=0 [radians]
      PathPoint bifemlh_r-P1: pelvis (-0.1185898 -0.09656835 0.06537677)
      PathPoint bifemlh_r-P2: tibia_r (-0.02581295 -0.03087265 0.02523838)
      PathPoint bifemlh_r-P3: tibia_r (-0.02006721 -0.0482814 0.02941477)
    Millard2012EquilibriumMuscle bifemsh_r: max_isometric_force=804 optimal_fiber_length=0.160331
        tendon_slack_length=0.08248244 pennation_angle_at_optimal=0.4014257
      PathPoint P1: femur_r (0.004753174 -0.2006787 0.02224484)
      PathPoint P2: tibia_r (-0.02581295 -0.03087265 0.02523838)
      PathPoint P3: tibia_r (-0.02006721 -0.0482814 0.02941477)
    Millard2012EquilibriumMuscle glut_max_r: max_isometric_force=1944 optimal_fiber_length=0.1390372
        tendon_slack_length=0.1201205 pennation_angle_at_optimal=0
      PathPoint P1: pelvis (-0.1270061 0.0165702 0.05300568)
      PathPoint P2: pelvis (-0.1295487 -0.04895727 0.08605179)
      PathPoint P3: femur_r (-0.04049702 -0.05038363 0.02785357)
      PathPoint P4: femur_r (-0.01482987 -0.09658484 0.03983163)
    Millard2012EquilibriumMuscle iliopsoas_r: max_isometric_force=2342 optimal_fiber_length=0.09434617
        tendon_slack_length=0.1509539 pennation_angle_at_optimal=0.1396263
      PathPoint psoas_r-P1: pelvis (-0.06091412 0.08350983 0.02720897)
      PathPoint psoas_r-P2: pelvis (-0.02240734 -0.05366471 0.0714588)
      ConditionalPathPoint psoas_r-P3: pelvis (-0.02711478 -0.07578967 0.07682528)
          socket_coordinate=/jointset/hip_r/hip_flexion_r range=(-1.5708 0.785398) [radians]
      PathPoint psoas_r-P4: femur_r (0.001521012 -0.04819721 0.003612411)
      PathPoint psoas_r-P5: femur_r (-0.01787192 -0.05675287 0.009886605)
    Millard2012EquilibriumMuscle rect_fem_r: max_isometric_force=1169 optimal_fiber_length=0.1087776
        tendon_slack_length=0.2957986 pennation_angle_at_optimal=0.08726646
      PathPoint P1: pelvis (-0.02777382 -0.02928017 0.09113589)
      ConditionalPathPoint P2: femur_r (0.03175119 -0.3831061 0.001806209)
          socket_coordinate=/jointset/knee_r/knee_angle_r range=(-2.61799 -1.45997)
      MovingPathPoint P3: tibia_r socket_x_coordinate=/jointset/knee_r/knee_angle_r
          socket_y_coordinate=/jointset/knee_r/knee_angle_r socket_z_coordinate=/jointset/knee_r/knee_angle_r
        x_location: MultiplierFunction: scale=0.8575743
          SimmSpline: x=(-2.0944 -1.99997 -1.5708 -1.45752 -1.39626 -1.0472 -0.698132 -0.526391 -0.349066 -0.174533 0 0.00017453 0.00034907 0.0279253 0.0872665 0.174533 2.0944)
              y=(0.0155805 0.0179938 0.0275081 0.0296564 0.0307615 0.0365695 0.0422074 0.0450902 0.048391 0.0534299 0.0617576 0.0617669 0.0617762 0.0633083 0.066994 0.0733035 0.0573481)
        y_location: MultiplierFunction: scale=0.8575743
          SimmSpline: x=(-2.0944 -1.99997 -1.5708 -1.45752 -1.39626 -1.0472 -0.698132 -0.526391 -0.349066 -0.174533 0 0.00017453 0.00034907 0.0279253 0.0872665 0.174533 2.0944)
              y=(0.0234116 0.0237613 0.0251141 0.0252795 0.0253146 0.0249184 0.0242373 0.0238447 0.0234197 0.0227644 0.020984 0.0209814 0.0209788 0.0205225 0.0191754 0.0159554 -0.0673774)
        z_location: MultiplierFunction: scale=0.8575743
          SimmSpline: x=(-2.0944 0.1745) y=(0.0014 0.0014)
    Millard2012EquilibriumMuscle vasti_r: max_isometric_force=5000 optimal_fiber_length=0.08360476
        tendon_slack_length=0.1306925 pennation_angle_at_optimal=0.05235988
      PathPoint vas_int_r-P1: femur_r (0.02756844 -0.1829022 0.02946965)
      PathPoint vas_int_r-P2: femur_r (0.03184623 -0.1981124 0.02709306)
      ConditionalPathPoint vas_int_r-P3: femur_r (0.03260675 -0.3831061 0.005228491)
          socket_coordinate=/jointset/knee_r/knee_angle_r range=(-2.61799 -1.42)
      MovingPathPoint vas_int_r-P4: tibia_r socket_x_coordinate=/jointset/knee_r/knee_angle_r
          socket_y_coordinate=/jointset/knee_r/knee_angle_r socket_z_coordinate=/jointset/knee_r/knee_angle_r
        x_location: MultiplierFunction: scale=0.8575743
          SimmSpline: x=(-2.0944 -1.99997 -1.5708 -1.45752 -1.39626 -1.0472 -0.698132 -0.526391 -0.349066 -0.174533 0 0.00017453 0.00034907 0.0279253 0.0872665 0.174533 2.0944)
              y=(0.0082733 0.0106866 0.0202042 0.022353 0.0234583 0.0292715 0.0349465 0.037871 0.0412569 0.0465287 0.0554632 0.0554735 0.0554837 0.0571717 0.061272 0.0684368 0.0648818)
        y_location: MultiplierFunction: scale=0.8575743
          SimmSpline: x=(-2.0944 -1.99997 -1.5708 -1.45752 -1.39626 -1.0472 -0.698132 -0.526391 -0.349066 -0.174533 0 0.00017453 0.00034907 0.0279253 0.0872665 0.174533 2.0944)
              y=(0.025599 0.0259487 0.0273124 0.0274796 0.0275151 0.0271363 0.0265737 0.0263073 0.0261187 0.0260129 0.0252923 0.0252911 0.0252898 0.0250526 0.0242191 0.0218288 -0.0685706)
        z_location: MultiplierFunction: scale=0.8575743
          SimmSpline: x=(-2.0944 2.0944) y=(0.0018 0.0018)
    Millard2012EquilibriumMuscle gastroc_r: max_isometric_force=2500 optimal_fiber_length=0.05199106
        tendon_slack_length=0.3379419 pennation_angle_at_optimal=0.296706
      PathPoint med_gas_r-P1: femur_r (-0.01806209 -0.3735047 -0.02233988)
      ConditionalPathPoint med_gas_r-P2: femur_r (-0.02851904 -0.3823454 -0.02452638)
          socket_coordinate=/jointset/knee_r/knee_angle_r range=(-0.785398 0.174533)
      PathPoint med_gas_r-P3: calcn_r (0 0.02824689 -0.004829313)
    Millard2012EquilibriumMuscle soleus_r: max_isometric_force=5137 optimal_fiber_length=0.04352179
        tendon_slack_length=0.2176089 pennation_angle_at_optimal=0.4363323
      PathPoint P1: tibia_r (-0.002058183 -0.1314665 0.006088775)
      PathPoint P2: calcn_r (0 0.02824689 -0.004829313)
    Millard2012EquilibriumMuscle tib_ant_r: max_isometric_force=3000 optimal_fiber_length=0.08521817
        tendon_slack_length=0.1939148 pennation_angle_at_optimal=0.08726646
      PathPoint P1: tibia_r (0.01535061 -0.13927 0.009862092)
      PathPoint P2: tibia_r (0.02821419 -0.3388272 -0.0151791)
      PathPoint P3: calcn_r (0.1062448 0.01621919 -0.02779134)
    Millard2012EquilibriumMuscle hamstrings_l: max_isometric_force=2700 optimal_fiber_length=0.1022671
        tendon_slack_length=0.3058632 pennation_angle_at_optimal=0
      PathPoint bifemlh_l-P1: pelvis (-0.1185898 -0.09656835 -0.06537677)
      PathPoint bifemlh_l-P2: tibia_l (-0.02581295 -0.03087265 -0.02523838)
      PathPoint bifemlh_l-P3: tibia_l (-0.02006721 -0.0482814 -0.02941477)
    Millard2012EquilibriumMuscle bifemsh_l: max_isometric_force=804 optimal_fiber_length=0.160331
        tendon_slack_length=0.08248244 pennation_angle_at_optimal=0.4014257
      PathPoint P1: femur_l (0.004753174 -0.2006787 -0.02224484)
      PathPoint P2: tibia_l (-0.02581295 -0.03087265 -0.02523838)
      PathPoint P3: tibia_l (-0.02006721 -0.0482814 -0.02941477)
    Millard2012EquilibriumMuscle glut_max_l: max_isometric_force=1944 optimal_fiber_length=0.1390372
        tendon_slack_length=0.1201205 pennation_angle_at_optimal=0
      PathPoint P1: pelvis (-0.1270061 0.0165702 -0.05300568)
      PathPoint P2: pelvis (-0.1295487 -0.04895727 -0.08605179)
      PathPoint P3: femur_l (-0.04049702 -0.05038363 -0.02785357)
      PathPoint P4: femur_l (-0.01482987 -0.09658484 -0.03983163)
    Millard2012EquilibriumMuscle iliopsoas_l: max_isometric_force=2342 optimal_fiber_length=0.09434617
        tendon_slack_length=0.1509539 pennation_angle_at_optimal=0.1396263
      PathPoint psoas_l-P1: pelvis (-0.06091412 0.08350983 -0.02720897)
      PathPoint psoas_l-P2: pelvis (-0.02240734 -0.05366471 -0.0714588)
      ConditionalPathPoint psoas_l-P3: pelvis (-0.02711478 -0.07578967 -0.07682528)
          socket_coordinate=/jointset/hip_l/hip_flexion_l range=(-1.5708 0.785398)
      PathPoint psoas_l-P4: femur_l (0.001521012 -0.04819721 -0.003612411)
      PathPoint psoas_l-P5: femur_l (-0.01787192 -0.05675287 -0.009886605)
    Millard2012EquilibriumMuscle rect_fem_l: max_isometric_force=1169 optimal_fiber_length=0.1087776
        tendon_slack_length=0.2957986 pennation_angle_at_optimal=0.08726646
      PathPoint P1: pelvis (-0.02777382 -0.02928017 -0.09113589)
      ConditionalPathPoint P2: femur_l (0.03175119 -0.3831061 -0.001806209)
          socket_coordinate=/jointset/knee_l/knee_angle_l range=(-2.61799 -1.45997)
      MovingPathPoint P3: tibia_l socket_x_coordinate=/jointset/knee_l/knee_angle_l
          socket_y_coordinate=/jointset/knee_l/knee_angle_l socket_z_coordinate=/jointset/knee_l/knee_angle_l
        x_location: MultiplierFunction: scale=0.8575743
          SimmSpline: x=(-2.0944 -1.99997 -1.5708 -1.45752 -1.39626 -1.0472 -0.698132 -0.526391 -0.349066 -0.174533 0 0.00017453 0.00034907 0.0279253 0.0872665 0.174533 2.0944)
              y=(0.0155805 0.0179938 0.0275081 0.0296564 0.0307615 0.0365695 0.0422074 0.0450902 0.048391 0.0534299 0.0617576 0.0617669 0.0617762 0.0633083 0.066994 0.0733035 0.0573481)
        y_location: MultiplierFunction: scale=0.8575743
          SimmSpline: x=(-2.0944 -1.99997 -1.5708 -1.45752 -1.39626 -1.0472 -0.698132 -0.526391 -0.349066 -0.174533 0 0.00017453 0.00034907 0.0279253 0.0872665 0.174533 2.0944)
              y=(0.0234116 0.0237613 0.0251141 0.0252795 0.0253146 0.0249184 0.0242373 0.0238447 0.0234197 0.0227644 0.020984 0.0209814 0.0209788 0.0205225 0.0191754 0.0159554 -0.0673774)
        z_location: MultiplierFunction: scale=0.8575743
          SimmSpline: x=(-2.0944 0.1745) y=(-0.0014 -0.0014)
    Millard2012EquilibriumMuscle vasti_l: min_control=0.021 max_isometric_force=5000 optimal_fiber_length=0.08360476
        tendon_slack_length=0.1306925 pennation_angle_at_optimal=0.05235988
      PathPoint vas_int_l-P1: femur_l (0.02756844 -0.1829022 -0.02946965)
      PathPoint vas_int_l-P2: femur_l (0.03184623 -0.1981124 -0.02709306)
      ConditionalPathPoint vas_int_l-P3: femur_l (0.03260675 -0.3831061 -0.005228491)
          socket_coordinate=/jointset/knee_l/knee_angle_l range=(-2.61799 -1.42)
      MovingPathPoint vas_int_l-P4: tibia_l socket_x_coordinate=/jointset/knee_l/knee_angle_l
          socket_y_coordinate=/jointset/knee_l/knee_angle_l socket_z_coordinate=/jointset/knee_l/knee_angle_l
        x_location: MultiplierFunction: scale=0.8575743
          SimmSpline: x=(-2.0944 -1.99997 -1.5708 -1.45752 -1.39626 -1.0472 -0.698132 -0.526391 -0.349066 -0.174533 0 0.00017453 0.00034907 0.0279253 0.0872665 0.174533 2.0944)
              y=(0.0082733 0.0106866 0.0202042 0.022353 0.0234583 0.0292715 0.0349465 0.037871 0.0412569 0.0465287 0.0554632 0.0554735 0.0554837 0.0571717 0.061272 0.0684368 0.0648818)
        y_location: MultiplierFunction: scale=0.8575743
          SimmSpline: x=(-2.0944 -1.99997 -1.5708 -1.45752 -1.39626 -1.0472 -0.698132 -0.526391 -0.349066 -0.174533 0 0.00017453 0.00034907 0.0279253 0.0872665 0.174533 2.0944)
              y=(0.025599 0.0259487 0.0273124 0.0274796 0.0275151 0.0271363 0.0265737 0.0263073 0.0261187 0.0260129 0.0252923 0.0252911 0.0252898 0.0250526 0.0242191 0.0218288 -0.0685706)
        z_location: MultiplierFunction: scale=0.8575743
          SimmSpline: x=(-2.0944 2.0944) y=(-0.0018 -0.0018)
    Millard2012EquilibriumMuscle gastroc_l: max_isometric_force=2500 optimal_fiber_length=0.05199106
        tendon_slack_length=0.3379419 pennation_angle_at_optimal=0.296706
      PathPoint med_gas_l-P1: femur_l (-0.01806209 -0.3735047 0.02233988)
      ConditionalPathPoint med_gas_l-P2: femur_l (-0.02851904 -0.3823454 0.02452638)
          socket_coordinate=/jointset/knee_l/knee_angle_l range=(-0.785398 0.174533)
      PathPoint med_gas_l-P3: calcn_l (0 0.02824689 0.004829313)
    Millard2012EquilibriumMuscle soleus_l: max_isometric_force=5137 optimal_fiber_length=0.04352179
        tendon_slack_length=0.2176089 pennation_angle_at_optimal=0.4363323
      PathPoint P1: tibia_l (-0.002058183 -0.1314665 -0.006088775)
      PathPoint P2: calcn_l (0 0.02824689 0.004829313)
    Millard2012EquilibriumMuscle tib_ant_l: max_isometric_force=3000 optimal_fiber_length=0.08521817
        tendon_slack_length=0.1939148 pennation_angle_at_optimal=0.08726646
      PathPoint P1: tibia_l (0.01535061 -0.13927 -0.009862092)
      PathPoint P2: tibia_l (0.02821419 -0.3388272 0.0151791)
      PathPoint P3: calcn_l (0.1062448 0.01621919 0.02779134)
    CoordinateActuator lAFO_torq_gen: coordinate=lAFO_hinge optimal_force=1
    CoordinateActuator rAFO_torq_gen: coordinate=rAFO_hinge optimal_force=1
    BushingForce BushingForces_leftUpperAfoAttach: socket_frame1=AFO_l_upper_offset socket_frame2=tibia_l_offset
        rotational_stiffness=(0 0 50) [Nm/rad] translational_stiffness=(300 0 0) [N/m]
        rotational_damping=(0 0 15) [Nm/(rad/s)] translational_damping=(40 0 0) [N/(m/s)]
      PhysicalOffsetFrame AFO_l_upper_offset: socket_parent=/bodyset/AFO_l_upper translation=(0 0 0)
      PhysicalOffsetFrame tibia_l_offset: socket_parent=/bodyset/tibia_l translation=(0 0 0)
    BushingForce BushingForces_leftLowerAfoAttach: socket_frame1=AFO_l_lower_offset socket_frame2=talus_l_offset
        rotational_stiffness=(0 0 0) translational_stiffness=(600 0 0) rotational_damping=(0 0 0)
        translational_damping=(40 0 0)
      PhysicalOffsetFrame AFO_l_lower_offset: socket_parent=/bodyset/AFO_l_lower translation=(0 0 0)
      PhysicalOffsetFrame talus_l_offset: socket_parent=/bodyset/talus_l translation=(0 0 0)
    BushingForce BushingForces_rightUpperAfoAttach: socket_frame1=AFO_r_upper_offset socket_frame2=tibia_r_offset
        rotational_stiffness=(0 0 50) translational_stiffness=(300 0 0) rotational_damping=(0 0 15)
        translational_damping=(40 0 0)
      PhysicalOffsetFrame AFO_r_upper_offset: socket_parent=/bodyset/AFO_r_upper translation=(0 0 0)
      PhysicalOffsetFrame tibia_r_offset: socket_parent=/bodyset/tibia_r translation=(0 0 0)
    BushingForce BushingForces_rightLowerAfoAttach: socket_frame1=AFO_r_lower_offset socket_frame2=talus_r_offset
        rotational_stiffness=(0 0 0) translational_stiffness=(600 0 0) rotational_damping=(0 0 0)
        translational_damping=(40 0 0)
      PhysicalOffsetFrame AFO_r_lower_offset: socket_parent=/bodyset/AFO_r_lower translation=(0 0 0)
      PhysicalOffsetFrame talus_r_offset: socket_parent=/bodyset/talus_r translation=(0 0 0)
  MarkerSet:
    Marker asis_r: pelvis (0.01286463 0 0.1176195)
    Marker asis_l: pelvis (0.01286463 0 -0.1176195)
    Marker midasis: pelvis (0.01286463 0 0) fixed=true
    Marker psis_r: pelvis (-0.1451865 0.0347832 0.05144841)
    Marker psis_l: pelvis (-0.1451865 0.0347832 -0.05144841)
    Marker hip_r: pelvis (-0.06496638 -0.06073943 0.07672833) fixed=true
    Marker hip_l: pelvis (-0.06496638 -0.06073943 -0.07672833) fixed=true
    Marker midhip: pelvis (-0.06496638 -0.06073943 0) fixed=true
    Marker epicondLat_r: femur_r (-0.001657255 -0.3322797 0.03728824)
    Marker epicondMed_r: femur_r (0.005800394 -0.3339369 -0.03314511)
    Marker thighwand_r: femur_r (0 -0.1988706 0.1242941)
    Marker upperleg1_r: femur_r (0 -0.1160079 0.08286277)
    Marker upperleg2_r: femur_r (0 -0.2817334 0.06214707)
    Marker malleolusLat_r: tibia_r (-0.006072717 -0.3600254 0.04337655)
    Marker malleolusMedv_r: tibia_r (0.007807779 -0.3478799 -0.03036358)
    Marker shankwand_r: tibia_r (0 -0.2602593 0.1084414)
    Marker lowerleg1_r: tibia_r (0 -0.112779 0.05205186)
    Marker knee_r: tibia_r (0 0 0) fixed=true
    Marker ankle_r: tibia_r (0 -0.3730383 0) fixed=true
    Marker toe_r: calcn_r (0.1508176 0.02217906 0)
    Marker heel_r: calcn_r (-0.009758786 0.02217906 0)
    Marker epicondLat_l: femur_l (-0.001657255 -0.3322797 -0.03728824)
    Marker epicondMed_l: femur_l (0.005800394 -0.3339369 0.03314511)
    Marker thighwand_l: femur_l (0 -0.1988706 -0.1242941)
    Marker upperleg1_l: femur_l (0 -0.1160079 -0.08286277)
    Marker upperleg2_l: femur_l (0 -0.2817334 -0.06214707)
    Marker malleolusLat_l: tibia_l (-0.006072717 -0.3600254 -0.04337655)
    Marker malleolusMedv_l: tibia_l (0.007807779 -0.3478799 0.03036358)
    Marker shankwand_l: tibia_l (0 -0.2602593 -0.1084414)
    Marker lowerleg1_l: tibia_l (0 -0.112779 -0.05205186)
    Marker knee_l: tibia_l (0 0 0) fixed=true
    Marker ankle_l: tibia_l (0 -0.3730383 0) fixed=true
    Marker toe_l: calcn_l (0.1508176 0.02217906 0)
    Marker heel_l: calcn_l (-0.009758786 0.02217906 0)
    Marker subclavicle_r: torso (0.02855459 0.3616915 0.06424783)
    Marker subclavicle_l: torso (0.02855459 0.3616915 -0.06424783)
    Marker neck: torso (-0.07138648 0.4021438 0)
    Marker sternalnotch: torso (0.02855459 0.3616915 0)
    Marker xyphoidprocess: torso (0.09280242 0.2189185 0)
  ProbeSet:
    Umberger2010MuscleMetabolicsProbe metabolics: probe_operation=value initial_conditions_for_integration=0
        activation_maintenance_rate_on=true shortening_rate_on=true basal_rate_on=false mechanical_work_rate_on=true
        aerobic_factor=1.5 report_total_metabolics_only=false
      # Aerobic scale factor (S=1.0 for primarily anaerobic conditions and S=1.5 for primarily aerobic conditions. See Umberger et al., (2003).
      Umberger2010MuscleMetabolicsProbe_MetabolicMuscleParameterSet:
        Umberger2010MuscleMetabolicsProbe_MetabolicMuscleParameter hamstrings_r: ratio_slow_twitch_fibers=0.49
            use_provided_muscle_mass=false
        Umberger2010MuscleMetabolicsProbe_MetabolicMuscleParameter bifemsh_r: ratio_slow_twitch_fibers=0.53
            use_provided_muscle_mass=false
        Umberger2010MuscleMetabolicsProbe_MetabolicMuscleParameter glut_max_r: ratio_slow_twitch_fibers=0.55
            use_provided_muscle_mass=false
        Umberger2010MuscleMetabolicsProbe_MetabolicMuscleParameter iliopsoas_r: ratio_slow_twitch_fibers=0.5
            use_provided_muscle_mass=false
        Umberger2010MuscleMetabolicsProbe_MetabolicMuscleParameter rect_fem_r: ratio_slow_twitch_fibers=0.39
            use_provided_muscle_mass=false
        Umberger2010MuscleMetabolicsProbe_MetabolicMuscleParameter vasti_r: ratio_slow_twitch_fibers=0.5
            use_provided_muscle_mass=false
        Umberger2010MuscleMetabolicsProbe_MetabolicMuscleParameter gastroc_r: ratio_slow_twitch_fibers=0.54
            use_provided_muscle_mass=false
        Umberger2010MuscleMetabolicsProbe_MetabolicMuscleParameter soleus_r: ratio_slow_twitch_fibers=0.8
            use_provided_muscle_mass=false
        Umberger2010MuscleMetabolicsProbe_MetabolicMuscleParameter tib_ant_r: ratio_slow_twitch_fibers=0.7
            use_provided_muscle_mass=false
        Umberger2010MuscleMetabolicsProbe_MetabolicMuscleParameter hamstrings_l: ratio_slow_twitch_fibers=0.49
            use_provided_muscle_mass=false
        Umberger2010MuscleMetabolicsProbe_MetabolicMuscleParameter bifemsh_l: ratio_slow_twitch_fibers=0.53
            use_provided_muscle_mass=false
        Umberger2010MuscleMetabolicsProbe_MetabolicMuscleParameter glut_max_l: ratio_slow_twitch_fibers=0.55
            use_provided_muscle_mass=false
        Umberger2010MuscleMetabolicsProbe_MetabolicMuscleParameter iliopsoas_l: ratio_slow_twitch_fibers=0.5
            use_provided_muscle_mass=false
        Umberger2010MuscleMetabolicsProbe_MetabolicMuscleParameter rect_fem_l: ratio_slow_twitch_fibers=0.39
            use_provided_muscle_mass=false
        Umberger2010MuscleMetabolicsProbe_MetabolicMuscleParameter vasti_l: ratio_slow_twitch_fibers=0.5
            use_provided_muscle_mass=false
        Umberger2010MuscleMetabolicsProbe_MetabolicMuscleParameter gastroc_l: ratio_slow_twitch_fibers=0.54
            use_provided_muscle_mass=false
        Umberger2010MuscleMetabolicsProbe_MetabolicMuscleParameter soleus_l: ratio_slow_twitch_fibers=0.8
            use_provided_muscle_mass=false
        Umberger2010MuscleMetabolicsProbe_MetabolicMuscleParameter tib_ant_l: ratio_slow_twitch_fibers=0.7
            use_provided_muscle_mass=false
