# OpenSim document version 40000
CMCTool walk_subject:
  model_file: C:\Users\tm262836\Documents\OpenSim\4.4\Models\Mokadim_Simulation\Gait10dof18musc_73Kg\CMC\subject01_73kg_metabolics.osim
  replace_force_set: false
  force_set_files: gait10dof_Reserve_Actuators.xml
  results_directory: C:\Users\tm262836\Desktop\GIL11_slow\Gait10dof18musc\CMC\ResultsCMC
  output_precision: 8
  initial_time: 0.26667
  final_time: 1.55733
  solve_for_equilibrium_for_auxiliary_states: true
  maximum_number_of_integrator_steps: 20000
  maximum_integrator_step_size: 1
  minimum_integrator_step_size: 1e-8
  integrator_error_tolerance: 1e-5
  external_loads_file: C:\Users\tm262836\Desktop\GIL11_slow\Gait10dof18musc\CMC\..\dataFiles\GIL11_free_grf.xml
  desired_kinematics_file: ../RRA/ResultsRRA/GIL11_10DOF_TorsoCOM_adjusted_Kinematics_q.sto
  task_set_file: gait10dof_Kinematics_Tracking_Tasks.xml
  lowpass_cutoff_frequency: -1
  cmc_time_window: 0.01
  use_fast_optimization_target: true
  optimizer_algorithm: ipopt
  numerical_derivative_step_size: 1e-5
  optimization_convergence_tolerance: 1e-5
  optimizer_max_iterations: 1000
  optimizer_print_level: 0
  use_verbose_printing: false
  AnalysisSet Analyses:
    ProbeReporter MetabolicsReporter
