# OpenSim document version 40000
CMCTool GIL11_10DOF_backpack_lAFO:
  model_file: ../GIL11_gait10DOF_backpack_AFO_ajusted.osim
  replace_force_set: false
  force_set_files: gait10dof_Reserve_Actuators.xml
  results_directory: ResultsCMC_allMusc_AFO
  output_precision: 8
  initial_time: 0.19333
  final_time: 1.08233
  solve_for_equilibrium_for_auxiliary_states: true
  maximum_number_of_integrator_steps: 20000
  maximum_integrator_step_size: 1
  minimum_integrator_step_size: 1e-8
  integrator_error_tolerance: 1e-5
  external_loads_file: C:/Users/tm262836/Desktop/GIL11_v2/Gait10dof18musc_backpack_AFO/CMC/../dataFiles/GIL11_free_20kgload_grf.xml
  desired_kinematics_file: ../RRA/ResultsRRA/GIL11_10DOF_backpack_AFO_Kinematics_q.sto
  task_set_file: gait10dof_Kinematics_Tracking_Tasks.xml
  constraints_file: C:/Users/tm262836/Desktop/GIL11_v2/Gait10dof18musc_backpack_AFO/CMC/../dataFiles/Ankle_excitation_cap1.xml
  lowpass_cutoff_frequency: 6
  cmc_time_window: 0.01
  use_fast_optimization_target: true
  optimizer_algorithm: ipopt
  numerical_derivative_step_size: 1e-5
  optimization_convergence_tolerance: 1e-5
  optimizer_max_iterations: 1000
  optimizer_print_level: 0
  use_verbose_printing: false
  AnalysisSet Analyses:
    ProbeReporter MetabolicsReporter
    ForceReporter: start_time=0.19333 end_time=1.08233 step_interval=1 in_degrees=true include_constraint_forces=true
