# OpenSim document version 40000
ForceSet muscles_ForseSet:
  Millard2012EquilibriumMuscle [values shared by the 18 below unless stated]: appliesForce=false optimal_force=1
      max_contraction_velocity=10 activation_time_constant=0.01 [seconds] deactivation_time_constant=0.04 [seconds]
      minimum_activation=0.01
    ActiveForceLengthCurve: minimum_value=0
    ForceVelocityCurve: concentric_slope_at_vmax=0 concentric_slope_near_vmax=0.25 isometric_slope=5
        eccentric_slope_at_vmax=0 eccentric_slope_near_vmax=0.15 max_eccentric_velocity_force_multiplier=1.4
    FiberForceLengthCurve
    TendonForceLengthCurve
  Millard2012EquilibriumMuscle hamstrings_r: max_isometric_force=2700 optimal_fiber_length=0.1236311
      tendon_slack_length=0.369759 pennation_angle_at_optimal=0 [radians]
    PathPoint bifemlh_r-P1: pelvis (-0.129056 -0.105091 0.0711466)
    PathPoint bifemlh_r-P2: tibia_r (-0.0297545 -0.0355868 0.0290922)
    PathPoint bifemlh_r-P3: tibia_r (-0.0231314 -0.0556538 0.0339063)
  Millard2012EquilibriumMuscle bifemsh_r: max_isometric_force=804 optimal_fiber_length=0.1914449
      tendon_slack_length=0.09848899 pennation_angle_at_optimal=0.4014257
    PathPoint P1: femur_r (0.0057362 -0.242182 0.0268454)
    PathPoint P2: tibia_r (-0.0297545 -0.0355868 0.0290922)
    PathPoint P3: tibia_r (-0.0231314 -0.0556538 0.0339063)
  Millard2012EquilibriumMuscle glut_max_r: max_isometric_force=1944 optimal_fiber_length=0.1593947
      tendon_slack_length=0.1377084 pennation_angle_at_optimal=0
    PathPoint P1: pelvis (-0.138215 0.0180326 0.0576837)
    PathPoint P2: pelvis (-0.140982 -0.053278 0.0936463)
    PathPoint P3: femur_r (-0.0488724 -0.0608037 0.0336141)
    PathPoint P4: femur_r (-0.0178969 -0.11656 0.0480694)
  Millard2012EquilibriumMuscle iliopsoas_r: max_isometric_force=2342 optimal_fiber_length=0.1051723
      tendon_slack_length=0.1682757 pennation_angle_at_optimal=0.1396263
    PathPoint psoas_r-P1: pelvis (-0.0662901 0.09088 0.0296103)
    PathPoint psoas_r-P2: pelvis (-0.0243849 -0.0584009 0.0777654)
    ConditionalPathPoint psoas_r-P3: pelvis (-0.0295078 -0.0824785 0.0836055)
        socket_coordinate=/jointset/hip_r/hip_flexion_r range=(-1.5708 0.785398) [radians]
    PathPoint psoas_r-P4: femur_r (0.00183558 -0.0581651 0.00435951)
    PathPoint psoas_r-P5: femur_r (-0.0215681 -0.0684902 0.0119313)
  Millard2012EquilibriumMuscle rect_fem_r: max_isometric_force=1169 optimal_fiber_length=0.1304623
      tendon_slack_length=0.354766 pennation_angle_at_optimal=0.08726646
    PathPoint P1: pelvis (-0.030225 -0.0318643 0.0991791)
    ConditionalPathPoint P2: femur_r (0.0383178 -0.462338 0.00217976) socket_coordinate=/jointset/knee_r/knee_angle_r
        range=(-2.61799 -1.45997)
    MovingPathPoint P3: tibia_r socket_x_coordinate=/jointset/knee_r/knee_angle_r
        socket_y_coordinate=/jointset/knee_r/knee_angle_r socket_z_coordinate=/jointset/knee_r/knee_angle_r
      x_location: MultiplierFunction: scale=0.988523
        SimmSpline: x=(-2.0944 -1.99997 -1.5708 -1.45752 -1.39626 -1.0472 -0.698132 -0.526391 -0.349066 -0.174533 0 0.00017453 0.00034907 0.0279253 0.0872665 0.174533 2.0944)
            y=(0.0155805 0.0179938 0.0275081 0.0296564 0.0307615 0.0365695 0.0422074 0.0450902 0.048391 0.0534299 0.0617576 0.0617669 0.0617762 0.0633083 0.066994 0.0733035 0.0573481)
      y_location: MultiplierFunction: scale=0.988523
        SimmSpline: x=(-2.0944 -1.99997 -1.5708 -1.45752 -1.39626 -1.0472 -0.698132 -0.526391 -0.349066 -0.174533 0 0.00017453 0.00034907 0.0279253 0.0872665 0.174533 2.0944)
            y=(0.0234116 0.0237613 0.0251141 0.0252795 0.0253146 0.0249184 0.0242373 0.0238447 0.0234197 0.0227644 0.020984 0.0209814 0.0209788 0.0205225 0.0191754 0.0159554 -0.0673774)
      z_location: MultiplierFunction: scale=0.988523
        SimmSpline: x=(-2.0944 0.1745) y=(0.0014 0.0014)
  Millard2012EquilibriumMuscle vasti_r: max_isometric_force=5000 optimal_fiber_length=0.1013743
      tendon_slack_length=0.1584701 pennation_angle_at_optimal=0.05235988
    PathPoint vas_int_r-P1: femur_r (0.03327 -0.220729 0.0355644)
    PathPoint vas_int_r-P2: femur_r (0.0384325 -0.239085 0.0326963)
    ConditionalPathPoint vas_int_r-P3: femur_r (0.0393503 -0.462338 0.00630982)
        socket_coordinate=/jointset/knee_r/knee_angle_r range=(-2.61799 -1.42)
    MovingPathPoint vas_int_r-P4: tibia_r socket_x_coordinate=/jointset/knee_r/knee_angle_r
        socket_y_coordinate=/jointset/knee_r/knee_angle_r socket_z_coordinate=/jointset/knee_r/knee_angle_r
      x_location: MultiplierFunction: scale=0.988523
        SimmSpline: x=(-2.0944 -1.99997 -1.5708 -1.45752 -1.39626 -1.0472 -0.698132 -0.526391 -0.349066 -0.174533 0 0.00017453 0.00034907 0.0279253 0.0872665 0.174533 2.0944)
            y=(0.0082733 0.0106866 0.0202042 0.022353 0.0234583 0.0292715 0.0349465 0.037871 0.0412569 0.0465287 0.0554632 0.0554735 0.0554837 0.0571717 0.061272 0.0684368 0.0648818)
      y_location: MultiplierFunction: scale=0.988523
        SimmSpline: x=(-2.0944 -1.99997 -1.5708 -1.45752 -1.39626 -1.0472 -0.698132 -0.526391 -0.349066 -0.174533 0 0.00017453 0.00034907 0.0279253 0.0872665 0.174533 2.0944)
            y=(0.025599 0.0259487 0.0273124 0.0274796 0.0275151 0.0271363 0.0265737 0.0263073 0.0261187 0.0260129 0.0252923 0.0252911 0.0252898 0.0250526 0.0242191 0.0218288 -0.0685706)
      z_location: MultiplierFunction: scale=0.988523
        SimmSpline: x=(-2.0944 2.0944) y=(0.0018 0.0018)
  Millard2012EquilibriumMuscle gastroc_r: max_isometric_force=2500 optimal_fiber_length=0.0600858
      tendon_slack_length=0.3905577 pennation_angle_at_optimal=0.296706
    PathPoint med_gas_r-P1: femur_r (-0.0217976 -0.450751 -0.0269601)
    ConditionalPathPoint med_gas_r-P2: femur_r (-0.0344172 -0.46142 -0.0295988)
        socket_coordinate=/jointset/knee_r/knee_angle_r range=(-0.785398 0.174533)
    PathPoint med_gas_r-P3: calcn_r (0 0.0318396 -0.00544355)
  Millard2012EquilibriumMuscle soleus_r: max_isometric_force=5137 optimal_fiber_length=0.0502888
      tendon_slack_length=0.251444 pennation_angle_at_optimal=0.4363323
    PathPoint P1: tibia_r (-0.00237246 -0.151541 0.00701851)
    PathPoint P2: calcn_r (0 0.0318396 -0.00544355)
  Millard2012EquilibriumMuscle tib_ant_r: max_isometric_force=3000 optimal_fiber_length=0.09791263
      tendon_slack_length=0.2228012 pennation_angle_at_optimal=0.08726646
    PathPoint P1: tibia_r (0.0176946 -0.160536 0.011368)
    PathPoint P2: tibia_r (0.0325224 -0.390565 -0.0174969)
    PathPoint P3: calcn_r (0.119758 0.0182821 -0.0313261)
  Millard2012EquilibriumMuscle hamstrings_l: max_isometric_force=2700 optimal_fiber_length=0.1236311
      tendon_slack_length=0.369759 pennation_angle_at_optimal=0
    PathPoint bifemlh_l-P1: pelvis (-0.129056 -0.105091 -0.0711466)
    PathPoint bifemlh_l-P2: tibia_l (-0.0297545 -0.0355868 -0.0290922)
    PathPoint bifemlh_l-P3: tibia_l (-0.0231314 -0.0556538 -0.0339063)
  Millard2012EquilibriumMuscle bifemsh_l: max_isometric_force=804 optimal_fiber_length=0.1914449
      tendon_slack_length=0.09848899 pennation_angle_at_optimal=0.4014257
    PathPoint P1: femur_l (0.0057362 -0.242182 -0.0268454)
    PathPoint P2: tibia_l (-0.0297545 -0.0355868 -0.0290922)
    PathPoint P3: tibia_l (-0.0231314 -0.0556538 -0.0339063)
  Millard2012EquilibriumMuscle glut_max_l: max_isometric_force=1944 optimal_fiber_length=0.1593947
      tendon_slack_length=0.1377084 pennation_angle_at_optimal=0
    PathPoint P1: pelvis (-0.138215 0.0180326 -0.0576837)
    PathPoint P2: pelvis (-0.140982 -0.053278 -0.0936463)
    PathPoint P3: femur_l (-0.0488724 -0.0608037 -0.0336141)
    PathPoint P4: femur_l (-0.0178969 -0.11656 -0.0480694)
  Millard2012EquilibriumMuscle iliopsoas_l: max_isometric_force=2342 optimal_fiber_length=0.1051723
      tendon_slack_length=0.1682757 pennation_angle_at_optimal=0.1396263
    PathPoint psoas_l-P1: pelvis (-0.0662901 0.09088 -0.0296103)
    PathPoint psoas_l-P2: pelvis (-0.0243849 -0.0584009 -0.0777654)
    ConditionalPathPoint psoas_l-P3: pelvis (-0.0295078 -0.0824785 -0.0836055)
        socket_coordinate=/jointset/hip_l/hip_flexion_l range=(-1.5708 0.785398)
    PathPoint psoas_l-P4: femur_l (0.00183558 -0.0581651 -0.00435951)
    PathPoint psoas_l-P5: femur_l (-0.0215681 -0.0684902 -0.0119313)
  Millard2012EquilibriumMuscle rect_fem_l: max_isometric_force=1169 optimal_fiber_length=0.1304623
      tendon_slack_length=0.354766 pennation_angle_at_optimal=0.08726646
    PathPoint P1: pelvis (-0.030225 -0.0318643 -0.0991791)
    ConditionalPathPoint P2: femur_l (0.0383178 -0.462338 -0.00217976) socket_coordinate=/jointset/knee_l/knee_angle_l
        range=(-2.61799 -1.45997)
    MovingPathPoint P3: tibia_l socket_x_coordinate=/jointset/knee_l/knee_angle_l
        socket_y_coordinate=/jointset/knee_l/knee_angle_l socket_z_coordinate=/jointset/knee_l/knee_angle_l
      x_location: MultiplierFunction: scale=0.988523
        SimmSpline: x=(-2.0944 -1.99997 -1.5708 -1.45752 -1.39626 -1.0472 -0.698132 -0.526391 -0.349066 -0.174533 0 0.00017453 0.00034907 0.0279253 0.0872665 0.174533 2.0944)
            y=(0.0155805 0.0179938 0.0275081 0.0296564 0.0307615 0.0365695 0.0422074 0.0450902 0.048391 0.0534299 0.0617576 0.0617669 0.0617762 0.0633083 0.066994 0.0733035 0.0573481)
      y_location: MultiplierFunction: scale=0.988523
        SimmSpline: x=(-2.0944 -1.99997 -1.5708 -1.45752 -1.39626 -1.0472 -0.698132 -0.526391 -0.349066 -0.174533 0 0.00017453 0.00034907 0.0279253 0.0872665 0.174533 2.0944)
            y=(0.0234116 0.0237613 0.0251141 0.0252795 0.0253146 0.0249184 0.0242373 0.0238447 0.0234197 0.0227644 0.020984 0.0209814 0.0209788 0.0205225 0.0191754 0.0159554 -0.0673774)
      z_location: MultiplierFunction: scale=0.988523
        SimmSpline: x=(-2.0944 0.1745) y=(-0.0014 -0.0014)
  Millard2012EquilibriumMuscle vasti_l: max_isometric_force=5000 optimal_fiber_length=0.1013743
      tendon_slack_length=0.1584701 pennation_angle_at_optimal=0.05235988
    PathPoint vas_int_l-P1: femur_l (0.03327 -0.220729 -0.0355644)
    PathPoint vas_int_l-P2: femur_l (0.0384325 -0.239085 -0.0326963)
    ConditionalPathPoint vas_int_l-P3: femur_l (0.0393503 -0.462338 -0.00630982)
        socket_coordinate=/jointset/knee_l/knee_angle_l range=(-2.61799 -1.42)
    MovingPathPoint vas_int_l-P4: tibia_l socket_x_coordinate=/jointset/knee_l/knee_angle_l
        socket_y_coordinate=/jointset/knee_l/knee_angle_l socket_z_coordinate=/jointset/knee_l/knee_angle_l
      x_location: MultiplierFunction: scale=0.988523
        SimmSpline: x=(-2.0944 -1.99997 -1.5708 -1.45752 -1.39626 -1.0472 -0.698132 -0.526391 -0.349066 -0.174533 0 0.00017453 0.00034907 0.0279253 0.0872665 0.174533 2.0944)
            y=(0.0082733 0.0106866 0.0202042 0.022353 0.0234583 0.0292715 0.0349465 0.037871 0.0412569 0.0465287 0.0554632 0.0554735 0.0554837 0.0571717 0.061272 0.0684368 0.0648818)
      y_location: MultiplierFunction: scale=0.988523
        SimmSpline: x=(-2.0944 -1.99997 -1.5708 -1.45752 -1.39626 -1.0472 -0.698132 -0.526391 -0.349066 -0.174533 0 0.00017453 0.00034907 0.0279253 0.0872665 0.174533 2.0944)
            y=(0.025599 0.0259487 0.0273124 0.0274796 0.0275151 0.0271363 0.0265737 0.0263073 0.0261187 0.0260129 0.0252923 0.0252911 0.0252898 0.0250526 0.0242191 0.0218288 -0.0685706)
      z_location: MultiplierFunction: scale=0.988523
        SimmSpline: x=(-2.0944 2.0944) y=(-0.0018 -0.0018)
  Millard2012EquilibriumMuscle gastroc_l: max_isometric_force=2500 optimal_fiber_length=0.0600858
      tendon_slack_length=0.3905577 pennation_angle_at_optimal=0.296706
    PathPoint med_gas_l-P1: femur_l (-0.0217976 -0.450751 0.0269601)
    ConditionalPathPoint med_gas_l-P2: femur_l (-0.0344172 -0.46142 0.0295988)
        socket_coordinate=/jointset/knee_l/knee_angle_l range=(-0.785398 0.174533)
    PathPoint med_gas_l-P3: calcn_l (0 0.0318396 0.00544355)
  Millard2012EquilibriumMuscle soleus_l: max_isometric_force=5137 optimal_fiber_length=0.0502888
      tendon_slack_length=0.251444 pennation_angle_at_optimal=0.4363323
    PathPoint P1: tibia_l (-0.00237246 -0.151541 -0.00701851)
    PathPoint P2: calcn_l (0 0.0318396 0.00544355)
  Millard2012EquilibriumMuscle tib_ant_l: max_isometric_force=3000 optimal_fiber_length=0.09791263
      tendon_slack_length=0.2228012 pennation_angle_at_optimal=0.08726646
    PathPoint P1: tibia_l (0.0176946 -0.160536 -0.011368)
    PathPoint P2: tibia_l (0.0325224 -0.390565 0.0174969)
    PathPoint P3: calcn_l (0.119758 0.0182821 0.0313261)
