# OpenSim document version 40000
Model GIL11_10DOF18musc_backpack_AFO_1musc_RRA_adjusted:
  gravity: 0 -9.80665 0
  length_units: meters
  force_units: N
  credits:
    Delp S.L., Loan J.P., Hoy M.G., Zajac F.E., Topp E.L., Rosen J.M., Thelen D.G., Anderson F.C., Seth A. Notes: 3D, 23 DOF gait model created by D.G. Thelen, Univ. of Wisconsin-Madison, and Ajay Seth, Frank C. Anderson, and Scott L. Delp, Stanford University. Lower extremity joint defintions based on Delp et al. (1990). Low back joint and anthropometry based on Anderson and Pandy (1999, 2001). Planar knee model of Yamaguchi and Zajac (1989). Seth replaced tibia translation constraints with a CustomJoint for the knee and removed the patella to eliminate all kinematic constraints; insertions of the quadrucepts are handled with moving points in the tibia frame as defined by Delp 1990. Number of muscles was reduced by Anderson to improve simulation speed for demonstrations and is not intended to be used in research. License: Creative Commons (CCBY 3.0). You are free to distribute, remix, tweak, and build upon this work, even commercially, as long as you credit us for the original creation. http://creativecommons.org/licenses/by/3.0/ More Information: http://simtk-confluence.stanford.edu:8080/display/OpenSim/Gait+2392+and+2354+Models
  publications:
    Delp, S.L., Loan, J.P., Hoy, M.G., Zajac, F.E., Topp E.L., Rosen, J.M.: An interactive graphics-based model of the lower extremity to study orthopaedic surgical procedures, IEEE Transactions on Biomedical Engineering, vol. 37, pp. 757-767, 1990. Yamaguchi G.T., Zajac F.E.: A planar model of the knee joint to characterize the knee extensor mechanism." J . Biomech. vol. 22. pp. 1-10. 1989. Anderson F.C., Pandy M.G.: A dynamic optimization solution for vertical jumping in three dimensions. Computer Methods in Biomechanics and Biomedical Engineering 2:201-231, 1999. Anderson F.C., Pandy M.G.: Dynamic optimization of human walking. Journal of Biomechanical Engineering 123:381-390, 2001.
  Ground
  BodySet:
    Body pelvis: mass=9.886685 [kg] mass_center=(-0.06656325 0 0) inertia=(0.07649635 0.06481333 0.04308488 0 0 0)
        meshes=(sacrum.vtp pelvis.vtp l_pelvis.vtp)
    Body femur_r: mass=7.808441 mass_center=(0 -0.1616081 0) inertia=(0.1015839 0.02662876 0.1071219 0 0 0)
        meshes=femur_r.vtp
    Body tibia_r: mass=3.112413 mass_center=(0 -0.1601089 0) inertia=(0.03111647 0.003148691 0.03154866 0 0 0)
        meshes=(tibia_r.vtp fibula.vtp)
    Body talus_r: mass=0.08394909 mass_center=(0 0 0) inertia=(0.0007840443 0.0007840443 0.0007840443 0 0 0)
        meshes=talus.vtp
    Body calcn_r: mass=1.049364 mass_center=(0.09111867 0.0273356 0)
        inertia=(0.0009757949 0.002718286 0.002857685 0 0 0) meshes=foot.vtp
    Body toes_r: mass=0.1818337 mass_center=(0.03152709 0.00546712 -0.01594577)
        inertia=(6.969964e-5 0.0001393993 6.969964e-5 0 0 0) meshes=bofoot.vtp
    Body femur_l: mass=7.808441 mass_center=(0 -0.1616081 0) inertia=(0.1015839 0.02662876 0.1071219 0 0 0)
        meshes=femur_l.vtp
    Body tibia_l: mass=3.112413 mass_center=(0 -0.1601089 0) inertia=(0.03111647 0.003148691 0.03154866 0 0 0)
        meshes=(tibia_l.vtp l_fibula.vtp)
    Body talus_l: mass=0.08394909 mass_center=(0 0 0) inertia=(0.0007840443 0.0007840443 0.0007840443 0 0 0)
        meshes=l_talus.vtp
    Body calcn_l: mass=1.049364 mass_center=(0.09111867 0.0273356 0)
        inertia=(0.0009757949 0.002718286 0.002857685 0 0 0) meshes=l_foot.vtp
    Body toes_l: mass=0.1818337 mass_center=(0.03152709 0.00546712 0.01594577)
        inertia=(6.969964e-5 0.0001393993 6.969964e-5 0 0 0) meshes=l_bofoot.vtp
    Body torso: mass=28.74132 mass_center=(-0.03675071 0.328863 0) inertia=(1.307348 0.669857 1.269135 0 0 0)
        meshes=(hat_spine.vtp hat_jaw.vtp hat_skull.vtp hat_ribs.vtp)
    Body backpack: mass=20 mass_center=(0 0 0) inertia=(2.667 3.333 1.7333 0 0 0)
      Brick default: half_lengths=(0.11 0.27 0.2)
    Body AFO_lower: mass=0.1 mass_center=(0.08 -0.05 0) inertia=(0.005 0.0125 0.014 0 0 0) meshes=afoPlate.stl
    Body AFO_upper: mass=0.1 mass_center=(0 0.25 0) inertia=(0.02 0.005 0.02 0 0 0) meshes=afoCuff.stl
  JointSet:
    CustomJoint ground_pelvis: socket_parent_frame=ground_offset socket_child_frame=pelvis_offset
      Coordinate pelvis_tilt: default_value=0 range=(-1.570796 1.570796) clamped=false
      Coordinate pelvis_tx: default_value=0 range=(-5 5) clamped=false
      Coordinate pelvis_ty: default_value=1.015 range=(-1 2) clamped=false
      PhysicalOffsetFrame ground_offset: socket_parent=/ground translation=(0 0 0) [meters]
      PhysicalOffsetFrame pelvis_offset: socket_parent=/bodyset/pelvis translation=(0 0 0)
      SpatialTransform: axes_held_at_zero=(rotation2 rotation3 translation3)
        TransformAxis rotation1: coordinates=pelvis_tilt axis=(0 0 1) LinearFunction(coefficients=1 0)
        TransformAxis translation1: coordinates=pelvis_tx axis=(1 0 0) LinearFunction(coefficients=1 0)
        TransformAxis translation2: coordinates=pelvis_ty axis=(0 1 0) LinearFunction(coefficients=1 0)
    PinJoint hip_r: socket_parent_frame=pelvis_offset socket_child_frame=femur_r_offset
      Coordinate hip_flexion_r: default_value=0 range=(-2.094395 2.094395) clamped=false
      PhysicalOffsetFrame pelvis_offset: socket_parent=/bodyset/pelvis translation=(-0.06656325 -0.06223237 0.07861429)
      PhysicalOffsetFrame femur_r_offset: socket_parent=/bodyset/femur_r translation=(0 0 0)
    CustomJoint knee_r: socket_parent_frame=femur_r_offset socket_child_frame=tibia_r_offset
      Coordinate knee_angle_r: default_value=0 range=(-2.094395 0.1745329) clamped=false
      PhysicalOffsetFrame femur_r_offset: socket_parent=/bodyset/femur_r translation=(0 0 0)
      PhysicalOffsetFrame tibia_r_offset: socket_parent=/bodyset/tibia_r translation=(0 0 0)
      SpatialTransform: axes_held_at_zero=(rotation2 rotation3 translation3)
        TransformAxis rotation1: coordinates=knee_angle_r axis=(0 0 1) LinearFunction(coefficients=1 0)
        TransformAxis translation1: coordinates=knee_angle_r axis=(1 0 0)
          MultiplierFunction: scale=0.9506348
            SimmSpline: x=(-2.0944 -1.74533 -1.39626 -1.0472 -0.698132 -0.349066 -0.174533 0.197344 0.337395 0.490178 1.52146 2.0944)
                y=(-0.0032 0.00179 0.00411 0.0041 0.00212 -0.001 -0.0031 -0.005227 -0.005435 -0.005574 -0.005435 -0.00525)
        TransformAxis translation2: coordinates=knee_angle_r axis=(0 1 0)
          MultiplierFunction: scale=0.9506348
            SimmSpline: x=(-2.0944 -1.22173 -0.523599 -0.349066 -0.174533 0.159149 2.0944)
                y=(-0.4226 -0.4082 -0.399 -0.3976 -0.3966 -0.395264 -0.396)
    PinJoint ankle_r: socket_parent_frame=tibia_r_offset socket_child_frame=talus_r_offset
      Coordinate ankle_angle_r: default_value=0 range=(-1.570796 1.570796) clamped=false
      PhysicalOffsetFrame tibia_r_offset: socket_parent=/bodyset/tibia_r translation=(0 -0.3687571 0)
      PhysicalOffsetFrame talus_r_offset: socket_parent=/bodyset/talus_r translation=(0 0 0)
    WeldJoint subtalar_r: socket_parent_frame=talus_r_offset socket_child_frame=calcn_r_offset
      PhysicalOffsetFrame talus_r_offset: socket_parent=/bodyset/talus_r
          translation=(-0.04713192 -0.04054102 0.007653983)
      PhysicalOffsetFrame calcn_r_offset: socket_parent=/bodyset/calcn_r translation=(0 0 0)
    WeldJoint mtp_r: socket_parent_frame=calcn_r_offset socket_child_frame=toes_r_offset
      PhysicalOffsetFrame calcn_r_offset: socket_parent=/bodyset/calcn_r
          translation=(0.1629203 -0.001822373 0.0009840849)
      PhysicalOffsetFrame toes_r_offset: socket_parent=/bodyset/toes_r translation=(0 0 0)
    PinJoint hip_l: socket_parent_frame=pelvis_offset socket_child_frame=femur_l_offset
      Coordinate hip_flexion_l: default_value=0 range=(-2.094395 2.094395) clamped=false
      PhysicalOffsetFrame pelvis_offset: socket_parent=/bodyset/pelvis
          translation=(-0.06656325 -0.06223237 -0.07861429)
      PhysicalOffsetFrame femur_l_offset: socket_parent=/bodyset/femur_l translation=(0 0 0)
    CustomJoint knee_l: socket_parent_frame=femur_l_offset socket_child_frame=tibia_l_offset
      Coordinate knee_angle_l: default_value=0 range=(-2.094395 0.1745329) clamped=false
      PhysicalOffsetFrame femur_l_offset: socket_parent=/bodyset/femur_l translation=(0 0 0)
      PhysicalOffsetFrame tibia_l_offset: socket_parent=/bodyset/tibia_l translation=(0 0 0)
      SpatialTransform: axes_held_at_zero=(rotation2 rotation3 translation3)
        TransformAxis rotation1: coordinates=knee_angle_l axis=(0 0 1) LinearFunction(coefficients=1 0)
        TransformAxis translation1: coordinates=knee_angle_l axis=(1 0 0)
          MultiplierFunction: scale=0.9506348
            SimmSpline: x=(-2.0944 -1.74533 -1.39626 -1.0472 -0.698132 -0.349066 -0.174533 0.197344 0.337395 0.490178 1.52146 2.0944)
                y=(-0.0032 0.00179 0.00411 0.0041 0.00212 -0.001 -0.0031 -0.005227 -0.005435 -0.005574 -0.005435 -0.00525)
        TransformAxis translation2: coordinates=knee_angle_l axis=(0 1 0)
          MultiplierFunction: scale=0.9506348
            SimmSpline: x=(-2.0944 -1.22173 -0.523599 -0.349066 -0.174533 0.159149 2.0944)
                y=(-0.4226 -0.4082 -0.399 -0.3976 -0.3966 -0.395264 -0.396)
    PinJoint ankle_l: socket_parent_frame=tibia_l_offset socket_child_frame=talus_l_offset
      Coordinate ankle_angle_l: default_value=0 range=(-1.570796 1.570796) clamped=false
      PhysicalOffsetFrame tibia_l_offset: socket_parent=/bodyset/tibia_l translation=(0 -0.3687571 0)
      PhysicalOffsetFrame talus_l_offset: socket_parent=/bodyset/talus_l translation=(0 0 0)
    WeldJoint subtalar_l: socket_parent_frame=talus_l_offset socket_child_frame=calcn_l_offset
      PhysicalOffsetFrame talus_l_offset: socket_parent=/bodyset/talus_l
          translation=(-0.04713192 -0.04054102 -0.007653983)
      PhysicalOffsetFrame calcn_l_offset: socket_parent=/bodyset/calcn_l translation=(0 0 0)
    WeldJoint mtp_l: socket_parent_frame=calcn_l_offset socket_child_frame=toes_l_offset
      PhysicalOffsetFrame calcn_l_offset: socket_parent=/bodyset/calcn_l
          translation=(0.1629203 -0.001822373 -0.0009840849)
      PhysicalOffsetFrame toes_l_offset: socket_parent=/bodyset/toes_l translation=(0 0 0)
    PinJoint back: socket_parent_frame=pelvis_offset socket_child_frame=torso_offset
      Coordinate lumbar_extension: default_value=0 range=(-1.570796 1.570796) clamped=false
      PhysicalOffsetFrame pelvis_offset: socket_parent=/bodyset/pelvis translation=(-0.09480773 0.07673136 0)
      PhysicalOffsetFrame torso_offset: socket_parent=/bodyset/torso translation=(0 0 0)
    WeldJoint backpack_strips: socket_parent_frame=torso_offset socket_child_frame=backpack_offset
      PhysicalOffsetFrame backpack_offset: socket_parent=/bodyset/backpack translation=(0.2 -0.2 0)
      PhysicalOffsetFrame torso_offset: socket_parent=/bodyset/torso translation=(0 0 0)
    SliderJoint AFO_foot_slider: socket_parent_frame=talus_l_offset socket_child_frame=AFO_lower_offset
      Coordinate AFO_foot_slider: default_value=0 range=(-0.5 0.5) clamped=false is_free_to_satisfy_constraints=true
      PhysicalOffsetFrame talus_l_offset: socket_parent=/bodyset/talus_l translation=(0 0 0)
      PhysicalOffsetFrame AFO_lower_offset: socket_parent=/bodyset/AFO_lower translation=(0 0 0)
    PinJoint AFO_hinge: socket_parent_frame=AFO_lower_offset socket_child_frame=AFO_upper_offset
      Coordinate AFO_hinge: default_value=0 range=(-1.570796 1.570796) clamped=false
          is_free_to_satisfy_constraints=true
      PhysicalOffsetFrame AFO_lower_offset: socket_parent=/bodyset/AFO_lower translation=(0 0 0)
      PhysicalOffsetFrame AFO_upper_offset: socket_parent=/bodyset/AFO_upper translation=(0 0 0)
  ForceSet:
    Millard2012EquilibriumMuscle soleus_l: appliesForce=false min_control=0.01 optimal_force=1 max_isometric_force=5137
        optimal_fiber_length=0.04352179 tendon_slack_length=0.2176089 pennation_angle_at_optimal=0.4363323 [radians]
        max_contraction_velocity=10 activation_time_constant=0.01 [seconds] deactivation_time_constant=0.04 [seconds]
        minimum_activation=0.01
      PathPoint P1: tibia_l (-0.002058183 -0.1314665 -0.006088775)
      PathPoint P2: calcn_l (0 0.02824689 0.004829313)
      ActiveForceLengthCurve: minimum_value=0
      ForceVelocityCurve: concentric_slope_at_vmax=0 concentric_slope_near_vmax=0.25 isometric_slope=5
          eccentric_slope_at_vmax=0 eccentric_slope_near_vmax=0.15 max_eccentric_velocity_force_multiplier=1.4
      FiberForceLengthCurve
      TendonForceLengthCurve
    BushingForce BushingForces_upperAfoAttach: socket_frame1=AFO_upper_offset socket_frame2=tibia_l_offset
        rotational_stiffness=(0 0 50) [Nm/rad] translational_stiffness=(300 0 0) [N/m]
        rotational_damping=(0 0 15) [Nm/(rad/s)] translational_damping=(40 0 0) [N/(m/s)]
      PhysicalOffsetFrame AFO_upper_offset: socket_parent=/bodyset/AFO_upper translation=(0 0 0)
      PhysicalOffsetFrame tibia_l_offset: socket_parent=/bodyset/tibia_l translation=(0 0 0)
    BushingForce BushingForces_lowerAfoAttach: socket_frame1=AFO_lower_offset socket_frame2=talus_l_offset
        rotational_stiffness=(0 0 0) translational_stiffness=(300 0 0) rotational_damping=(0 0 0)
        translational_damping=(40 0 0)
      PhysicalOffsetFrame AFO_lower_offset: socket_parent=/bodyset/AFO_lower translation=(0 0 0)
      PhysicalOffsetFrame talus_l_offset: socket_parent=/bodyset/talus_l translation=(0 0 0)
  MarkerSet:
    Marker asis_r: pelvis (0.01286463 0 0.1176195)
    Marker asis_l: pelvis (0.01286463 0 -0.1176195)
    Marker midasis: pelvis (0.01286463 0 0) fixed=true
    Marker psis_r: pelvis (-0.1451865 0.0347832 0.05144841)
    Marker psis_l: pelvis (-0.1451865 0.0347832 -0.05144841)
    Marker hip_r: pelvis (-0.06496638 -0.06073943 0.07672833) fixed=true
    Marker hip_l: pelvis (-0.06496638 -0.06073943 -0.07672833) fixed=true
    Marker midhip: pelvis (-0.06496638 -0.06073943 0) fixed=true
    Marker epicondLat_r: femur_r (-0.001657255 -0.3322797 0.03728824)
    Marker epicondMed_r: femur_r (0.005800394 -0.3339369 -0.03314511)
    Marker thighwand_r: femur_r (0 -0.1988706 0.1242941)
    Marker upperleg1_r: femur_r (0 -0.1160079 0.08286277)
    Marker upperleg2_r: femur_r (0 -0.2817334 0.06214707)
    Marker malleolusLat_r: tibia_r (-0.006072717 -0.3600254 0.04337655)
    Marker malleolusMedv_r: tibia_r (0.007807779 -0.3478799 -0.03036358)
    Marker shankwand_r: tibia_r (0 -0.2602593 0.1084414)
    Marker lowerleg1_r: tibia_r (0 -0.112779 0.05205186)
    Marker knee_r: tibia_r (0 0 0) fixed=true
    Marker ankle_r: tibia_r (0 -0.3730383 0) fixed=true
    Marker toe_r: calcn_r (0.1508176 0.02217906 0)
    Marker heel_r: calcn_r (-0.009758786 0.02217906 0)
    Marker epicondLat_l: femur_l (-0.001657255 -0.3322797 -0.03728824)
    Marker epicondMed_l: femur_l (0.005800394 -0.3339369 0.03314511)
    Marker thighwand_l: femur_l (0 -0.1988706 -0.1242941)
    Marker upperleg1_l: femur_l (0 -0.1160079 -0.08286277)
    Marker upperleg2_l: femur_l (0 -0.2817334 -0.06214707)
    Marker malleolusLat_l: tibia_l (-0.006072717 -0.3600254 -0.04337655)
    Marker malleolusMedv_l: tibia_l (0.007807779 -0.3478799 0.03036358)
    Marker shankwand_l: tibia_l (0 -0.2602593 -0.1084414)
    Marker lowerleg1_l: tibia_l (0 -0.112779 -0.05205186)
    Marker knee_l: tibia_l (0 0 0) fixed=true
    Marker ankle_l: tibia_l (0 -0.3730383 0) fixed=true
    Marker toe_l: calcn_l (0.1508176 0.02217906 0)
    Marker heel_l: calcn_l (-0.009758786 0.02217906 0)
    Marker subclavicle_r: torso (0.02855459 0.3616915 0.06424783)
    Marker subclavicle_l: torso (0.02855459 0.3616915 -0.06424783)
    Marker neck: torso (-0.07138648 0.4021438 0)
    Marker sternalnotch: torso (0.02855459 0.3616915 0)
    Marker xyphoidprocess: torso (0.09280242 0.2189185 0)
  ProbeSet:
    Umberger2010MuscleMetabolicsProbe metabolics: enabled=false probe_operation=value
        initial_conditions_for_integration=0 activation_maintenance_rate_on=true shortening_rate_on=true
        basal_rate_on=false mechanical_work_rate_on=true aerobic_factor=1.5 report_total_metabolics_only=false
      # Aerobic scale factor (S=1.0 for primarily anaerobic conditions and S=1.5 for primarily aerobic conditions. See Umberger et al., (2003).
      Umberger2010MuscleMetabolicsProbe_MetabolicMuscleParameterSet:
        Umberger2010MuscleMetabolicsProbe_MetabolicMuscleParameter hamstrings_r: ratio_slow_twitch_fibers=0.49
            use_provided_muscle_mass=false
        Umberger2010MuscleMetabolicsProbe_MetabolicMuscleParameter bifemsh_r: ratio_slow_twitch_fibers=0.53
            use_provided_muscle_mass=false
        Umberger2010MuscleMetabolicsProbe_MetabolicMuscleParameter glut_max_r: ratio_slow_twitch_fibers=0.55
            use_provided_muscle_mass=false
        Umberger2010MuscleMetabolicsProbe_MetabolicMuscleParameter iliopsoas_r: ratio_slow_twitch_fibers=0.5
            use_provided_muscle_mass=false
        Umberger2010MuscleMetabolicsProbe_MetabolicMuscleParameter rect_fem_r: ratio_slow_twitch_fibers=0.39
            use_provided_muscle_mass=false
        Umberger2010MuscleMetabolicsProbe_MetabolicMuscleParameter vasti_r: ratio_slow_twitch_fibers=0.5
            use_provided_muscle_mass=false
        Umberger2010MuscleMetabolicsProbe_MetabolicMuscleParameter gastroc_r: ratio_slow_twitch_fibers=0.54
            use_provided_muscle_mass=false
        Umberger2010MuscleMetabolicsProbe_MetabolicMuscleParameter soleus_r: ratio_slow_twitch_fibers=0.8
            use_provided_muscle_mass=false
        Umberger2010MuscleMetabolicsProbe_MetabolicMuscleParameter tib_ant_r: ratio_slow_twitch_fibers=0.7
            use_provided_muscle_mass=false
        Umberger2010MuscleMetabolicsProbe_MetabolicMuscleParameter hamstrings_l: ratio_slow_twitch_fibers=0.49
            use_provided_muscle_mass=false
        Umberger2010MuscleMetabolicsProbe_MetabolicMuscleParameter bifemsh_l: ratio_slow_twitch_fibers=0.53
            use_provided_muscle_mass=false
        Umberger2010MuscleMetabolicsProbe_MetabolicMuscleParameter glut_max_l: ratio_slow_twitch_fibers=0.55
            use_provided_muscle_mass=false
        Umberger2010MuscleMetabolicsProbe_MetabolicMuscleParameter iliopsoas_l: ratio_slow_twitch_fibers=0.5
            use_provided_muscle_mass=false
        Umberger2010MuscleMetabolicsProbe_MetabolicMuscleParameter rect_fem_l: ratio_slow_twitch_fibers=0.39
            use_provided_muscle_mass=false
        Umberger2010MuscleMetabolicsProbe_MetabolicMuscleParameter vasti_l: ratio_slow_twitch_fibers=0.5
            use_provided_muscle_mass=false
        Umberger2010MuscleMetabolicsProbe_MetabolicMuscleParameter gastroc_l: ratio_slow_twitch_fibers=0.54
            use_provided_muscle_mass=false
        Umberger2010MuscleMetabolicsProbe_MetabolicMuscleParameter soleus_l: ratio_slow_twitch_fibers=0.8
            use_provided_muscle_mass=false
        Umberger2010MuscleMetabolicsProbe_MetabolicMuscleParameter tib_ant_l: ratio_slow_twitch_fibers=0.7
            use_provided_muscle_mass=false
