# OpenSim document version 40000
MarkerSet:
  Marker Sternum: torso (0.2440076 0.7358422 0.02313449)
  Marker R.Acromium: torso (0.07263395 0.738152 0.1923019)
  Marker L.Acromium: torso (0.06421758 0.7450805 -0.14826)
  Marker Top.Head: torso (-0.04888415 0.9943916 0.03057202)
  Marker R.ASIS: pelvis (0.6063059 0.05799843 0.1575359)
  Marker L.ASIS: pelvis (0.6087055 0.04550886 -0.104325)
  Marker V.Sacral: pelvis (0.4098062 0.06444965 0.03624464)
  Marker R.Thigh.Upper: femur_r (0.6099381 -0.1961822 0.1455244)
  Marker R.Thigh.Front: femur_r (0.659909 -0.2710652 0.05576916)
  Marker R.Thigh.Rear: femur_r (0.5891787 -0.3160291 0.1478474)
  Marker R.Knee.Lat: femur_r (0.5423847 -0.3992879 0.1381526)
  Marker R.Knee.Med: femur_r (0.53599 -0.4270354 0.01933806)
  Marker R.Shank.Upper: tibia_r (0.5126805 -0.1076306 0.1575321)
  Marker R.Shank.Front: tibia_r (0.584309 -0.1524224 0.105439)
  Marker R.Shank.Rear: tibia_r (0.5238606 -0.1925147 0.1745828)
  Marker R.Ankle.Lat: tibia_r (0.5079839 -0.4784409 0.176896)
  Marker R.Ankle.Med: tibia_r (0.5144804 -0.472969 0.08649869)
  Marker R.Heel: calcn_r (0.4842007 -0.09664232 0.1240005)
  Marker R.Midfoot.Sup: calcn_r (0.624825 -0.08694321 0.07865443)
  Marker R.Midfoot.Lat: calcn_r (0.6268369 -0.1034997 0.1866255)
  Marker R.Toe.Lat: calcn_r (0.7172422 -0.1276956 0.1903636)
  Marker R.Toe.Med: calcn_r (0.7116025 -0.1180346 0.08169115)
  Marker R.Toe.Tip: calcn_r (0.7745918 -0.1166439 0.1090114)
  Marker L.Thigh.Upper: femur_l (0.5834233 -0.1847332 -0.09020089)
  Marker L.Thigh.Front: femur_l (0.6718136 -0.2344419 -0.03314681)
  Marker L.Thigh.Rear: femur_l (0.5720148 -0.2942782 -0.08171821)
  Marker L.Knee.Lat: femur_l (0.5436863 -0.4241772 -0.07165992)
  Marker L.Knee.Med: femur_l (0.5651779 -0.4331159 0.04226905)
  Marker L.Shank.Upper: tibia_l (0.5387398 -0.126256 -0.0922027)
  Marker L.Shank.Front: tibia_l (0.5876919 -0.1833789 -0.04925031)
  Marker L.Shank.Rear: tibia_l (0.5164835 -0.1669154 -0.1026687)
  Marker L.Ankle.Lat: tibia_l (0.5133332 -0.482902 -0.09359775)
  Marker L.Ankle.Med: tibia_l (0.5353358 -0.4675391 -0.003159197)
  Marker L.Heel: calcn_l (0.4889311 -0.09179264 -0.02947777)
  Marker L.Midfoot.Sup: calcn_l (0.6623043 -0.09023661 -0.008522207)
  Marker L.Midfoot.Lat: calcn_l (0.6406321 -0.1013738 -0.1057006)
  Marker L.Toe.Lat: calcn_l (0.7028258 -0.1273558 -0.1154441)
  Marker L.Toe.Med: calcn_l (0.7234051 -0.1156975 -0.01473396)
  Marker L.Toe.Tip: calcn_l (0.7719495 -0.1188697 -0.04122038)
