# OpenSim document version 40000
ScaleTool GIL11_10DOF18musc:
  mass: 63.1 [kg]
  height: 1620
  age: 0
  GenericModelMaker:
    marker_set_file: gait2392_GIL_Scale_MarkerSet.xml
  ModelScaler:
    scaling_order: measurements
    marker_file: GIL11_static.trc
    time_range: 0.258333 1.71667
    preserve_mass_distribution: true
    output_model_file: ..\GIL11_gait10DOF18musc_scaled.osim
    output_scale_file: GIL11_gait10DOF18smuc_ScaleSet_Applied.xml
    MeasurementSet gillette:
      Measurement torso: apply=true
        MarkerPair: markers=(midasis neck)
        BodyScale torso: axes=(X Y Z)
      Measurement pelvis: apply=true
        MarkerPair: markers=(asis_r asis_l)
        BodyScale pelvis: axes=(X Y Z)
      Measurement thigh: apply=true
        MarkerPair: markers=(hip_r knee_r)
        MarkerPair: markers=(hip_l knee_l)
        BodyScale femur_r: axes=(X Y Z)
        BodyScale femur_l: axes=(X Y Z)
      Measurement shank: apply=true
        MarkerPair: markers=(knee_r ankle_r)
        MarkerPair: markers=(knee_l ankle_l)
        BodyScale tibia_r: axes=(X Y Z)
        BodyScale talus_r: axes=(X Y Z)
        BodyScale tibia_l: axes=(X Y Z)
        BodyScale talus_l: axes=(X Y Z)
      Measurement foot: apply=true
        MarkerPair: markers=(heel_r toe_r)
        MarkerPair: markers=(heel_l toe_l)
        BodyScale calcn_r: axes=(X Y Z)
        BodyScale toes_r: axes=(X Y Z)
        BodyScale calcn_l: axes=(X Y Z)
        BodyScale toes_l: axes=(X Y Z)
  MarkerPlacer:
    marker_file: ../dataFiles/subject01_static.trc
    coordinate_file: ../dataFiles/subject01_static.mot
    time_range: 0.5 1
    output_model_file: ..\GIL11_gait10DOF18musc_scaled_markersAdjusted.osim
    output_marker_file: ..\Scale\GIL11_gait10DOF18musc_markers.xml
    IKTaskSet:
      IKMarkerTask Sternum: apply=true weight=3282
      IKMarkerTask R.Acromium: apply=true weight=1
      IKMarkerTask L.Acromium: apply=true weight=1
      IKMarkerTask Top.Head: apply=true weight=1
      IKMarkerTask R.ASIS: apply=true weight=16410
      IKMarkerTask L.ASIS: apply=true weight=16410
      IKMarkerTask V.Sacral: apply=true weight=16410
      IKMarkerTask R.Thigh.Upper: apply=true weight=1
      IKMarkerTask R.Thigh.Front: apply=true weight=1
      IKMarkerTask R.Thigh.Rear: apply=true weight=1
      IKMarkerTask R.Knee.Lat: apply=true weight=3282
      IKMarkerTask R.Knee.Med: apply=true weight=3282
      IKMarkerTask R.Shank.Upper: apply=true weight=1
      IKMarkerTask R.Shank.Front: apply=true weight=1
      IKMarkerTask R.Shank.Rear: apply=true weight=1
      IKMarkerTask R.Ankle.Lat: apply=true weight=16410
      IKMarkerTask R.Ankle.Med: apply=true weight=16410
      IKMarkerTask R.Heel: apply=true weight=16410
      IKMarkerTask R.Midfoot.Sup: apply=true weight=1
      IKMarkerTask R.Midfoot.Lat: apply=true weight=1
      IKMarkerTask R.Toe.Lat: apply=true weight=1
      IKMarkerTask R.Toe.Med: apply=true weight=1
      IKMarkerTask R.Toe.Tip: apply=true weight=1
      IKMarkerTask L.Thigh.Upper: apply=true weight=1
      IKMarkerTask L.Thigh.Front: apply=true weight=1
      IKMarkerTask L.Thigh.Rear: apply=true weight=1
      IKMarkerTask L.Knee.Lat: apply=true weight=3282
      IKMarkerTask L.Knee.Med: apply=true weight=3282
      IKMarkerTask L.Shank.Upper: apply=true weight=1
      IKMarkerTask L.Shank.Front: apply=true weight=1
      IKMarkerTask L.Shank.Rear: apply=true weight=1
      IKMarkerTask L.Ankle.Lat: apply=true weight=16410
      IKMarkerTask L.Ankle.Med: apply=true weight=16410
      IKMarkerTask L.Heel: apply=true weight=16410
      IKMarkerTask L.Midfoot.Sup: apply=true weight=1
      IKMarkerTask L.Midfoot.Lat: apply=true weight=1
      IKMarkerTask L.Toe.Lat: apply=true weight=1
      IKMarkerTask L.Toe.Med: apply=true weight=1
      IKMarkerTask L.Toe.Tip: apply=true weight=1
      IKMarkerTask asis_r: apply=false weight=1
      IKMarkerTask asis_l: apply=false weight=1
      IKMarkerTask midasis: apply=false weight=1
      IKMarkerTask psis_r: apply=false weight=1
      IKMarkerTask psis_l: apply=false weight=1
      IKMarkerTask hip_r: apply=false weight=1
      IKMarkerTask hip_l: apply=false weight=1
      IKMarkerTask midhip: apply=false weight=1
      IKMarkerTask epicondLat_r: apply=false weight=1
      IKMarkerTask epicondMed_r: apply=false weight=1
      IKMarkerTask thighwand_r: apply=false weight=1
      IKMarkerTask upperleg1_r: apply=false weight=1
      IKMarkerTask upperleg2_r: apply=false weight=1
      IKMarkerTask malleolusLat_r: apply=false weight=1
      IKMarkerTask malleolusMedv_r: apply=false weight=1
      IKMarkerTask shankwand_r: apply=false weight=1
      IKMarkerTask lowerleg1_r: apply=false weight=1
      IKMarkerTask knee_r: apply=false weight=1
      IKMarkerTask ankle_r: apply=false weight=1
      IKMarkerTask toe_r: apply=false weight=1
      IKMarkerTask heel_r: apply=false weight=1
      IKMarkerTask epicondLat_l: apply=false weight=1
      IKMarkerTask epicondMed_l: apply=false weight=1
      IKMarkerTask thighwand_l: apply=false weight=1
      IKMarkerTask upperleg1_l: apply=false weight=1
      IKMarkerTask upperleg2_l: apply=false weight=1
      IKMarkerTask malleolusLat_l: apply=false weight=1
      IKMarkerTask malleolusMedv_l: apply=false weight=1
      IKMarkerTask shankwand_l: apply=false weight=1
      IKMarkerTask lowerleg1_l: apply=false weight=1
      IKMarkerTask knee_l: apply=false weight=1
      IKMarkerTask ankle_l: apply=false weight=1
      IKMarkerTask toe_l: apply=false weight=1
      IKMarkerTask heel_l: apply=false weight=1
      IKMarkerTask subclavicle_r: apply=false weight=1
      IKMarkerTask subclavicle_l: apply=false weight=1
      IKMarkerTask neck: apply=false weight=1
      IKMarkerTask sternalnotch: apply=false weight=1
      IKMarkerTask xyphoidprocess: apply=false weight=1
      IKCoordinateTask [values shared by the 10 below unless stated]: value_type=default_value value=0 weight=1641
      IKCoordinateTask pelvis_tilt: weight=3282
      IKCoordinateTask pelvis_tx
      IKCoordinateTask pelvis_ty
      IKCoordinateTask hip_flexion_r
      IKCoordinateTask knee_angle_r
      IKCoordinateTask ankle_angle_r
      IKCoordinateTask hip_flexion_l
      IKCoordinateTask knee_angle_l
      IKCoordinateTask ankle_angle_l
      IKCoordinateTask lumbar_extension: weight=0
