# OpenSim document version 30000
MarkerSet:
  # Pelvis
  Marker asis_r: pelvis (0.014 0 0.128)
  Marker asis_l: pelvis (0.014 0 -0.128)
  Marker midasis: pelvis (0.014 0 0) fixed=true
  Marker psis_r: pelvis (-0.158 0.037853 0.055989)
  Marker psis_l: pelvis (-0.158 0.037853 -0.055989)
  Marker hip_r: pelvis (-0.0707 -0.0661 0.0835) fixed=true
  Marker hip_l: pelvis (-0.0707 -0.0661 -0.0835) fixed=true
  Marker midhip: pelvis (-0.0707 -0.0661 0) fixed=true
  # Right femur
  Marker epicondLat_r: femur_r (-0.002 -0.401 0.045)
  Marker epicondMed_r: femur_r (0.007 -0.403 -0.04)
  Marker thighwand_r: femur_r (0 -0.24 0.15)
  Marker upperleg1_r: femur_r (0 -0.14 0.1)
  Marker upperleg2_r: femur_r (0 -0.34 0.075)
  # Right tibia
  Marker malleolusLat_r: tibia_r (-0.007 -0.415 0.05)
  Marker malleolusMedv_r: tibia_r (0.009 -0.401 -0.035)
  Marker shankwand_r: tibia_r (0 -0.3 0.125)
  Marker lowerleg1_r: tibia_r (0 -0.13 0.06)
  Marker knee_r: tibia_r (0 0 0) fixed=true
  Marker ankle_r: tibia_r (0 -0.43 0) fixed=true
  # Right calcaneous
  Marker toe_r: calcn_r (0.17 0.025 0)
  Marker heel_r: calcn_r (-0.011 0.025 0)
  # Left femur
  Marker epicondLat_l: femur_l (-0.002 -0.401 -0.045)
  Marker epicondMed_l: femur_l (0.007 -0.403 0.04)
  Marker thighwand_l: femur_l (0 -0.24 -0.15)
  Marker upperleg1_l: femur_l (0 -0.14 -0.1)
  Marker upperleg2_l: femur_l (0 -0.34 -0.075)
  # Left tibia
  Marker malleolusLat_l: tibia_l (-0.007 -0.415 -0.05)
  Marker malleolusMedv_l: tibia_l (0.009 -0.401 0.035)
  Marker shankwand_l: tibia_l (0 -0.3 -0.125)
  Marker lowerleg1_l: tibia_l (0 -0.13 -0.06)
  Marker knee_l: tibia_l (0 0 0) fixed=true
  Marker ankle_l: tibia_l (0 -0.43 0) fixed=true
  # Left calcaneous
  Marker toe_l: calcn_l (0.17 0.025 0)
  Marker heel_l: calcn_l (-0.011 0.025 0)
  # Torso
  Marker subclavicle_r: torso (0.03 0.38 0.0675)
  Marker subclavicle_l: torso (0.03 0.38 -0.0675)
  Marker neck: torso (-0.075 0.4225 0)
  Marker sternalnotch: torso (0.03 0.38 0)
  Marker xyphoidprocess: torso (0.0975 0.23 0)
