# OpenSim document version 40000
ScaleTool GIL06_10DOF_78markers:
  mass: 81.9 [kg]
  height: 1590
  age: 0
  ModelScaler:
    apply: true
    scaling_order: measurements manualScale
    marker_file: GIL06_static.trc
    time_range: 0.6 0.76
    preserve_mass_distribution: true
    output_scale_file: GIL06_10DOF_scaleSet_applied.xml
    MeasurementSet gait2392:
      Measurement torso: apply=true
        MarkerPair: markers=(midasis neck)
        BodyScale torso: axes=(X Y Z)
      Measurement pelvis: apply=true
        MarkerPair: markers=(asis_r asis_l)
        BodyScale pelvis: axes=(X Y Z)
      Measurement thigh: apply=true
        MarkerPair: markers=(asis_r knee_r)
        MarkerPair: markers=(asis_l knee_l)
        BodyScale femur_r: axes=(X Y Z)
        BodyScale femur_l: axes=(X Y Z)
      Measurement shank: apply=true
        MarkerPair: markers=(knee_r ankle_r)
        MarkerPair: markers=(knee_l ankle_l)
        BodyScale tibia_r: axes=(X Y Z)
        BodyScale talus_r: axes=(X Y Z)
        BodyScale tibia_l: axes=(X Y Z)
        BodyScale talus_l: axes=(X Y Z)
      Measurement foot: apply=true
        MarkerPair: markers=(heel_r toe_r)
        MarkerPair: markers=(heel_l toe_l)
        BodyScale calcn_r: axes=(X Y Z)
        BodyScale toes_r: axes=(X Y Z)
        BodyScale calcn_l: axes=(X Y Z)
        BodyScale toes_l: axes=(X Y Z)
    ScaleSet gait2392_Scale:
      Scale: scales=(0.971662 0.971662 0.971662) segment=pelvis apply=true
      Scale: scales=(0.928017 0.928017 0.928017) segment=femur_r apply=true
      Scale: scales=(0.964332 0.964332 0.964332) segment=tibia_r apply=true
      Scale: scales=(0.964332 0.964332 0.964332) segment=talus_r apply=true
      Scale: scales=(0.963211 0.963211 0.963211) segment=calcn_r apply=true
      Scale: scales=(0.963211 0.963211 0.963211) segment=toes_r apply=true
      Scale: scales=(0.928017 0.928017 0.928017) segment=femur_l apply=true
      Scale: scales=(0.964332 0.964332 0.964332) segment=tibia_l apply=true
      Scale: scales=(0.964332 0.964332 0.964332) segment=talus_l apply=true
      Scale: scales=(0.963211 0.963211 0.963211) segment=calcn_l apply=true
      Scale: scales=(0.963211 0.963211 0.963211) segment=toes_l apply=true
      Scale: scales=(0.958946 0.958946 0.958946) segment=torso apply=true
  MarkerPlacer:
    apply: true
    marker_file: GIL06_static.trc
    coordinate_file: GIL06_static.mot
    time_range: 0.6 1.2
    output_motion_file: C:\Users\tm262836\Desktop\GIL_XX\GIL06\GIL06_free\Scale\GIL08_10DOF_static_output.mot
    output_model_file: C:\Users\tm262836\Desktop\GIL_XX\GIL06\GIL06_free\Scale\GIL08_10DOF_simbody.osim
    max_marker_movement: -1
    IKTaskSet gait2392_Scale:
      IKMarkerTask Sternum: apply=false weight=1
      IKMarkerTask R.Acromium: apply=false weight=1
      IKMarkerTask L.Acromium: apply=false weight=1
      IKMarkerTask Top.Head: apply=false weight=1
      IKMarkerTask R.ASIS: apply=false weight=1000
      IKMarkerTask L.ASIS: apply=false weight=1000
      IKMarkerTask V.Sacral: apply=false weight=1000
      IKMarkerTask R.Thigh.Upper: apply=false weight=1
      IKMarkerTask R.Thigh.Front: apply=false weight=1
      IKMarkerTask R.Thigh.Rear: apply=false weight=1
      IKMarkerTask R.Knee.Lat: apply=false weight=1000
      IKMarkerTask R.Knee.Med: apply=false weight=1000
      IKMarkerTask R.Shank.Upper: apply=false weight=1
      IKMarkerTask R.Shank.Front: apply=false weight=1
      IKMarkerTask R.Shank.Rear: apply=false weight=1
      IKMarkerTask R.Ankle.Lat: apply=false weight=1000
      IKMarkerTask R.Ankle.Med: apply=false weight=1000
      IKMarkerTask R.Heel: apply=false weight=1000
      IKMarkerTask R.Midfoot.Sup: apply=false weight=1
      IKMarkerTask R.Midfoot.Lat: apply=false weight=1
      IKMarkerTask R.Toe.Lat: apply=false weight=1
      IKMarkerTask R.Toe.Med: apply=false weight=1
      IKMarkerTask R.Toe.Tip: apply=false weight=1000
      IKMarkerTask L.Thigh.Upper: apply=false weight=1
      IKMarkerTask L.Thigh.Front: apply=false weight=1
      IKMarkerTask L.Thigh.Rear: apply=false weight=1
      IKMarkerTask L.Knee.Lat: apply=false weight=1000
      IKMarkerTask L.Knee.Med: apply=false weight=1000
      IKMarkerTask L.Shank.Upper: apply=false weight=1
      IKMarkerTask L.Shank.Front: apply=false weight=1
      IKMarkerTask L.Shank.Rear: apply=false weight=1
      IKMarkerTask L.Ankle.Lat: apply=false weight=1000
      IKMarkerTask L.Ankle.Med: apply=false weight=1000
      IKMarkerTask L.Heel: apply=false weight=1000
      IKMarkerTask L.Midfoot.Sup: apply=false weight=1
      IKMarkerTask L.Midfoot.Lat: apply=false weight=1
      IKMarkerTask L.Toe.Lat: apply=false weight=1
      IKMarkerTask L.Toe.Med: apply=false weight=1
      IKMarkerTask L.Toe.Tip: apply=false weight=1000
      IKMarkerTask asis_r: apply=true weight=1
      IKMarkerTask asis_l: apply=true weight=1
      IKMarkerTask midasis: apply=true weight=1
      IKMarkerTask psis_r: apply=true weight=1
      IKMarkerTask psis_l: apply=true weight=1
      IKMarkerTask hip_r: apply=true weight=1
      IKMarkerTask hip_l: apply=true weight=1
      IKMarkerTask midhip: apply=true weight=1
      IKMarkerTask epicondLat_r: apply=true weight=1
      IKMarkerTask epicondMed_r: apply=true weight=1
      IKMarkerTask thighwand_r: apply=true weight=1
      IKMarkerTask upperleg1_r: apply=true weight=1
      IKMarkerTask upperleg2_r: apply=true weight=1
      IKMarkerTask malleolusLat_r: apply=true weight=1
      IKMarkerTask malleolusMedv_r: apply=true weight=1
      IKMarkerTask shankwand_r: apply=true weight=1
      IKMarkerTask lowerleg1_r: apply=true weight=1
      IKMarkerTask knee_r: apply=true weight=1
      IKMarkerTask ankle_r: apply=true weight=1
      IKMarkerTask toe_r: apply=true weight=1
      IKMarkerTask heel_r: apply=true weight=1
      IKMarkerTask epicondLat_l: apply=true weight=1
      IKMarkerTask epicondMed_l: apply=true weight=1
      IKMarkerTask thighwand_l: apply=true weight=1
      IKMarkerTask upperleg1_l: apply=true weight=1
      IKMarkerTask upperleg2_l: apply=true weight=1
      IKMarkerTask malleolusLat_l: apply=true weight=1
      IKMarkerTask malleolusMedv_l: apply=true weight=1
      IKMarkerTask shankwand_l: apply=true weight=1
      IKMarkerTask lowerleg1_l: apply=true weight=1
      IKMarkerTask knee_l: apply=true weight=1
      IKMarkerTask ankle_l: apply=true weight=1
      IKMarkerTask toe_l: apply=true weight=1
      IKMarkerTask heel_l: apply=true weight=1
      IKMarkerTask subclavicle_r: apply=true weight=1
      IKMarkerTask subclavicle_l: apply=true weight=1
      IKMarkerTask neck: apply=true weight=1
      IKMarkerTask sternalnotch: apply=true weight=1
      IKMarkerTask xyphoidprocess: apply=true weight=0
      IKCoordinateTask lumbar_extension: apply=true weight=1000 value_type=manual_value value=0
