# OpenSim document version 40000
CMCTool GIL08_free_backpcak_adjusted:
  model_file: ../GIL08_gait10dof_backpack_adjusted.osim
  replace_force_set: false
  force_set_files: gait10dof_Reserve_Actuators.xml
  results_directory: ResultsCMC
  output_precision: 8
  initial_time: 0.18
  final_time: 1.18233
  solve_for_equilibrium_for_auxiliary_states: true
  maximum_number_of_integrator_steps: 20000
  maximum_integrator_step_size: 1
  minimum_integrator_step_size: 1e-8
  integrator_error_tolerance: 1e-5
  external_loads_file: ../dataFiles/GIL08_free_20kg_backpack_grf_custom.xml
  desired_kinematics_file: ../RRA/ResultsRRA/GIL08_10DOF_backpack_adjusted_Kinematics_q.sto
  task_set_file: gait10dof_Kinematics_Tracking_Tasks.xml
  lowpass_cutoff_frequency: -1
  cmc_time_window: 0.01
  use_fast_optimization_target: true
  optimizer_algorithm: ipopt
  numerical_derivative_step_size: 1e-5
  optimization_convergence_tolerance: 1e-5
  optimizer_max_iterations: 1000
  optimizer_print_level: 0
  use_verbose_printing: false
  AnalysisSet Analyses:
    ProbeReporter MetabolicsReporter
